# РАСЧЁТ СТАЛЕЖЕЛЕЗОБЕТОННОЙ БАЛКИ В СООТВЕТСТВИИ С СП 266.1325800.2016
# Composite Beam v. 2.1
# Добавлена жёсткопластическая теория
# Добавлена проверка на поперечную силу
# 0. Расчётная модель
# - Балка рядовая
# - Железобетн уложен по профилированному настилу
# - Второстепенные балки не предусмотрены
# - Положительный изгибающий момент
# - Объединение-упоры Нельсона
# - Проверка устойчивости на I и II стадиях не выполняется
# 1. Исходные данные
# 1.1 Материалы
# 1.1.1 Стальное сечение
# Модуль упругости стали
E_st := 206000*MPa
# Нормативный предел текучести стали
R_y.n := 305*MPa
# Коэффициент надёжности по материалу
γ_m := 1.025
# Расчётный предел текучести стали
R_y := R_y.n/γ_m
R_y = 297.561 MPa
# 1.1.2 Плита
# Модуль упругости бетона
E_b := 3.0*10^4*MPa
# Нормативное сопротивление бетона сжатию
R_b.n := 18.5*MPa
# Предельная отностительная деформация для сталежелезобетона
ε_b.lim := 0.0016
# Коэффициент ползучести бетона:
φ_b.cr := 3.2
# Коэффициент надёжности по бетону при сжатии
γ_b := 1.3
# Расчётное сопротивление бетона сжатию
R_b := R_b.n/γ_b
R_b = 14.2308 MPa
# Модуль деформаций бетона
E_b.τ := E_b/(1 + φ_b.cr)
E_b.τ = 7142.86 MPa
# 1.1.3 Араматура
# Модуль упругости арматуры
E_s := 2.00*10^5*MPa
# Нормативное сопротивление арматуры
R_s.n := 500*MPa
# Диамтер арматуры
d_s := 12*mm
# Шаг арматуры:
b_s := 200*mm
# Защитный слой верхней арматуры
a_s.u := 50*mm
# Защитный слой нижней арматуры:
a_s.l := 50*mm
# Количество рядов арматуры
n_row.rebar := 2
# Коэффициент надёжности по арматуре
γ_s := 1.15
# Расчётное значение сопротивления арматуры
R_s := R_s.n/γ_s
# 1.2. Геометрия
# 1.2.1 Балка
# 1.2.1.1 Сечение
# Номер профиля | 70*B4
# Высота двутавра
h_st := 710*mm
# Толщина стенки
t_w := 17*mm
# Ширина верхней полки
b_f2 := 262*mm
# Толщина врехней полки
t_f2 := 25*mm
# Ширина нижней полки
b_f1 := 262*mm
# Толщина нижней полки
t_f1 := 25*mm
# Площадь
A_st := 248.14*cm^2
# Момент инерции
J_st := 199680*cm^4
# Момент сопротивления крайних волокон верхней полки
W_f2.st := 5624.8*cm^3
# Момент сопротивления крайних волокон нижней полки
W_f1.st := 5624.8*cm^3
# Расстояние от Ц.Т. до наружной грани верхней полки
Z_f2.st := 35.5*cm
# Расстояние от Ц.Т. до наружной грани нижней полки
Z_f1.st := 35.5*cm
# 1.2.1.2 Пролёт балки
l_beam := 18*m
# 1.2.1.3 Шаг балок
B := 6*m
# 1.2.2 Плита
# Высота настила
h_п := 0*mm
# Толщина железобетона над настилом
h_f := 200*mm
# 1.3 Объединение стальной и железобетонной частей с помощью упор. Нельсона
# Диаметр анкера
d_an := 2.4*cm
# Длина анкера
l_an := 10*cm
# 1.4 Нагрузки и коэффициенты надёжности на нагрузке
# 1.4.1 Нагрузки
# 1.4.1.1 Первая стадия
# Постоянная нагрузка
q_1.DL := 1.2*kN/m^2
# 1.4.1.2 Вторая стадия
# Постоянная нагрузка
q_2.DL := 1.5*kN/m^2
# Временная нагрузка
q_LL := 2*kN/m^2
# 1.4.2 Коэффициенты надёжности по нагрузке
# Постоянная нагрузка первая стадия
γ_f.1.DL := 1.35
# Постоянная нагрузка вторая стадия
γ_f.2.DL := 1.35
# Временная нагрузка
γ_f.LL := 1.35
# 1.5 Коэффициенты условий работы
# Коэффициент условий работы стального элемента СП 16.13330
γ_c := 1
# Коэффициент условий работы бетона СП 63.13330
γ_bi := 1
# Коэффициент условий работы арматуры по СП 63.13330
γ_si := 1
# 1.6 Дополнительно
# Уравновешенные напряжения, возникающие на уровне центра тяжести поперечного сечения бетона от его ползучести, обжатия поперечных швов сборной плиты, усадки бетона и изменений температуры
σ_bi := 0*MPa
σ_si := 0*MPa
# 2.Расчёт
# 2.1. Геометрические характеристики
# 2.1.1 Стальное сечение
A_w.st := h_st*t_w
A_w.st = 120.7 cm^2
A_f1.st := b_f1*t_f1
A_f1.st = 65.5 cm^2
A_f2.st := b_f2*t_f2
A_f2.st = 65.5 cm^2
h_w := h_st - b_f1 - b_f2
h_w = 18.6 cm
# Условный момент сопротивления на уровне центра тяжести сечения бетона
W_b.st := J_st/(Z_f2.st + h_п + h_f/2)
W_b.st = 4388.57 cm^3
# 2.1.2 Бетонное сечение
# Половина ширины контакта железобетонной плиты и стального пояса
a := b_f1/2
a = 0.131 m
# Расчётная толщина бетона
t_sl := h_f
t_sl = 200 mm
# Расчётная ширина свеса железобетонной плиты (таблица 4.1 СП)
b :=
    B/2 if l_beam ≥ 4*B
    max(min(a + 6*t_sl, B/2), l_beam/8) otherwise
b = 2.25 m
# Расчётная ширина железобетонной плиты
b_sl := 2*b
b_sl = 4.5 m
# Расчётная площадь сечения железобетонной плиты
A_b := b_sl*t_sl
A_b = 900000 mm^2
# Момент инерции железобетонной плиты
J_b := b_sl*t_sl^3/12
J_b = 300000 cm^4
# Площадь арматуры на единицу длины
A_s := (π*d_s^2/4)/b_s
A_s = 5.65487 cm^2/m
# 2.1.3 Композитное сечение
# Коэффициент приведения
α_b := E_st/E_b.τ
α_b = 28.84
# Коэффициент приведения
α_s := E_st/E_s
α_s = 1.03
# Высота композитного сечения
H_stb := h_st + h_п + h_f
H_stb = 910 mm
# Площадь сталежелезобетонного сечения
A_red := A_st + A_b/α_b + n_row.rebar*1/α_s*(A_s*b_sl)
A_red = 60961.8 mm^2
# Расстояние от наружней грани полки до Ц.Т. плиты
C_b := h_п + h_f/2
C_b = 100 mm
# Расстояние от наружней грани полки до верхней грани плиты
h_b := h_п + h_f
h_b = 200 mm
# Расстояние между центрами тяжести плиты и стальной балки
Z_b.st := C_b + Z_f2.st
Z_b.st = 455 mm
Z_st.r_u := Z_f2.st + h_b - a_s.u
Z_st.r_u = 505 mm
Z_f2.st = 0.355 m
h_b = 0.2 m
Z_st.r_l := Z_f2.st + a_s.l
Z_st.r_l = 405 mm
# Статический момент инерции сталежелезобетонного сечения относительно Ц.Т. стального сечения
S_red := 1/α_b*A_b*Z_b.st + 1/α_s*A_s*b_sl*(Z_st.r_u + Z_st.r_l)
S_red = 16447250 mm^3
# Расстояние между центром тяжести стального и сталежелезобетонного сечения
Z_st.red := S_red/A_red
Z_st.red = 269.796 mm
Z_b.red := Z_b.st - Z_st.red
Z_b.red = 185.204 mm
Z_red.r_u := Z_b.red + h_f/2 - a_s.u
Z_red.r_u = 235.204 mm
Z_red.r_l := Z_b.red - h_f/2 + a_s.l
Z_red.r_l = 135.204 mm
# Момент инерции сталежелезобетонного сечения приведённого к металлу
J_red := J_st + A_st*Z_st.red^2 + 1/α_b*J_b + 1/α_b*A_b*Z_b.red^2 + 1/α_s*A_s*b_sl*(Z_red.r_u^2 + Z_red.r_l^2)
J_red = 5.15927e9 mm^4
# Расстояние между Ц.Т. сталежелезобетонного сечения и наружней гранью верхней полки
Z_red.f2 := Z_f2.st - Z_st.red
Z_red.f2 = 85.204 mm
# Расстояние между Ц.Т. сталежелезобетонного сечения и наружней гранью нижней полки
Z_red.f1 := Z_st.red + Z_f1.st
Z_red.f1 = 624.796 mm
# Расстояние между Ц.Т. бетонного и сталежелезобетонного сечения
Z_b.red := Z_b.st - Z_st.red
Z_b.red = 185.204 mm
# Момент сопротивления сталежелезобетонного сечения для верхней полки
W_f2.red := J_red/Z_red.f2
W_f2.red = 60552 cm^3
# Момент сопротивления сталежелезобетонного сечения для нижней полки
W_f1.red := J_red/Z_red.f1
W_f1.red = 8257.53 cm^3
# Момент сопротивления сталежелезобетонного сечения для Ц.Т. железобетонной плиты
W_b.red := J_red/Z_b.red
W_b.red = 27857.2 cm^3
# 2.2 Нагрузки
# Расчётная нагрузка I стадия
q_1 := γ_f.1.DL*q_1.DL*B
q_1 = 9.72 kN/m
# Расчётная нагрузка II стадия
q_2 := (γ_f.2.DL*q_2.DL + γ_f.LL*q_LL)*B
q_2 = 28.35 kN/m
# 2.3 Внутренние усилия в расчётных сечениях
# Сечение с максимальным изгибающим моментом
# I стадия | II стадия
# Расчётный изгибающий момент | Расчётный изгибающий момент
M_1 := q_1*l_beam^2/8
M_2 := q_2*l_beam^2/8
M_1 = 393.66 kN*m
M_2 = 1148.17 kN*m
# Суммарный изгибающий момент
M := M_1 + M_2
M = 1541.84 kN*m
# Сечение с максимальной поперечной силой
# I стадия | II стадия
# Расчётная поперечная сила | Расчётная поперечная сила
Q_1 := q_1*l_beam/2
Q_2 := q_2*l_beam/2
Q_1 = 87.48 kN
Q_2 = 255.15 kN
# Суммарная поперечная сила
Q := Q_1 + Q_2
Q = 342.63 kN
# 2.4 Проверка прочности поперечного сечения по нормальным напряжениям
# 2.4.1 С учётом пластической работы
# 2.4.1.1 Определение напряжений в бетоне и арматуре
# Напряжения в бетоне
σ_b := M_2/(α_b*W_b.red) - σ_bi
σ_b = 1.42914 MPa
# Напряжения в расчётной продольной арматуре
σ_s := M_2/(α_s*W_b.red) + σ_si
σ_s = 40.0159 MPa
# 2.4.1.2 Усилия воспринимаемые совместно бетоном с арматурой при различном уровне загружения
N_b.s := A_b*σ_b + A_s*n_row.rebar*b*σ_s
N_b.s = 1388.05 kN
N_bR.s := A_b*R_b + A_s*n_row.rebar*b*σ_s
N_bR.s = 12909.5 kN
N_bR.sR := A_b*R_b + A_s*n_row.rebar*b*R_s
N_bR.sR = 13914.1 kN
# Коэффициент условий работы верхнего стального пояса, учитывающий его разгрузку прилегающим недонапряженным бетоном и принимаемый не более 1.2
γ_1 := min(1 + (γ_bi*R_b - σ_b)/(γ_c*R_y)*A_b/A_f2.st, 1.2)
# 2.4.1.3 Верхний пояс
КИ_u.fl :=
    ((M - Z_b.st*N_b.s)/W_f2.st - N_b.s/A_st)/(γ_1*γ_c*R_y) if σ_b < γ_bi*R_b and σ_s < γ_si*R_s
    ((M - Z_b.st*N_bR.sR)/W_f2.st - N_bR.sR/A_st)/(γ_c*R_y) if σ_b ≥ γ_bi*R_b and σ_s < γ_si*R_s
    ((M - Z_b.st*N_bR.sR)/W_f2.st - N_bR.sR/A_st)/(γ_c*R_y) if σ_b ≥ γ_bi*R_b and σ_s ≥ γ_si*R_s
КИ_u.fl = 0.296559
M = 1541.84 kN*m
((M - Z_b.st*N_b.s)/W_f2.st - N_b.s/A_st)/(γ_1*γ_c*R_y) = 0.296559
((M - Z_b.st*N_bR.sR)/W_f2.st - N_bR.sR/A_st)/(γ_c*R_y) = -4.74577
((M - Z_b.st*N_bR.sR)/W_f2.st - N_bR.sR/A_st)/(γ_c*R_y) = -4.74577
# 2.4.1.4 Нижний пояс
КИ_l.fl :=
    ((M - Z_b.st*N_b.s)/W_f1.st + N_b.s/A_st)/(γ_c*R_y) if σ_b < γ_bi*R_b and σ_s < γ_si*R_s
    ((M - Z_b.st*N_bR.s)/W_f1.st + N_bR.s/A_st)/(γ_c*R_y) if σ_b ≥ γ_bi*R_b and σ_s < γ_si*R_s
    ((M - Z_b.st*N_bR.sR)/W_f1.st + N_bR.sR/A_st)/(γ_c*R_y) if σ_b ≥ γ_bi*R_b and σ_s ≥ γ_si*R_s
КИ_l.fl = 0.73185
# 2.4.1.5 Проверка напряжений в железобетонной части сечения
# Коэффициент, учитывающий увеличение относительных деформаций бетона при развитии пластических деформаций
σ_0 := (M - Z_b.st*N_bR.sR)/W_f2.st
σ_0 = -851.421 MPa
k :=
    1 if σ_0 ≤ γ_c*R_y
    (1 + 0.009*E_st/(γ_c*R_y)) if σ_0 > γ_c*R_y + N_bR.sR/A_st
    linterp([γ_c*R_y; γ_c*R_y + N_bR.sR/A_st], [1; 1 + 0.009*E_st/(γ_c*R_y)], σ_0) if σ_0 ≤ γ_c*R_y and σ_0 < γ_c*R_y + N_bR.sR/A_st
k = -11.767
# Условный момент сопротивления на уровне центра сечения бетона
КИ_concrete :=
    "не применимо" if σ_b < γ_bi*R_b and σ_s < γ_si*R_s
    "не применимо" if σ_b ≥ γ_bi*R_b and σ_s < γ_si*R_s
    k/E_st*((M_2 - Z_b.st*N_bR.sR)/W_b.st - N_bR.sR/A_st)/ε_b.lim if σ_b ≥ γ_bi*R_b and σ_s ≥ γ_si*R_s
КИ_concrete = "не применимо"
# 2.4.2 Жёсткопластическая теория
# Положение нейтральной оси отмеряется от наружней грани сталежелезобетонной балки
# Нейтральная ось в железобетонной плите
x_b := (R_y*A_st + R_s*A_s*b)/(R_b*b_sl) = 123.939 mm
# Нейтральная ось в верхней полке
x_f2 := (A_f1.st*R_y + (h_b + t_f2)*b_f2*R_y + A_w.st*R_y + h_b*b_f2*R_y - R_b*A_b - R_s*A_s*b)/(2*b_f2*R_y) = 162.345 mm
# Нейтральная ось пересекает стенку
x_w := (A_f1.st*R_y + (h_b + t_f2 + h_w)*t_w*R_y + (h_b + t_f2)*t_w*R_y - R_b*A_b - A_f2.st*R_y - R_s*A_s*b)/(2*t_w*R_y) = -1002.63 mm
x_NA :=
    x_b if x_b ≤ h_f
    x_f2 if x_f2 ≤ (h_b + t_f2) and x_f2 ≥ h_b
    x_w if x_w ≤ (h_b + t_f2 + h_w) and x_w ≥ (h_b + t_f2)
x_NA = 12.3939 cm
NALocation :=
    "Железобетонная плита" if x_b ≤ h_f
    "Верхняя полка" if x_f2 ≤ (h_b + t_f2) and x_f2 ≥ h_b
    "Стенка" if x_w ≤ (h_b + t_f2 + h_w) and x_w ≥ (h_b + t_f2)
    "Решения не существует" otherwise
NALocation = "Железобетонная плита"
# Определение моментов
# Бетон работающий на растяжение при определение предельного изгибающего момента не учитывается
# Нейтральная ось в железобетонной плите
# Арматура работающая на растяжении или сжатие при определении изгибающего момента не учитывается
# Уравнение относительно внутренней грани сжатой зоны
M_Rd.b := -R_b*b_sl*x_b*x_b/2 + R_y*A_f2.st*(h_b + t_f2/2) + R_y*A_w.st*(h_b + t_f2 + h_w/2) + R_y*A_f1.st*(h_b + t_f2 + h_w + t_f1/2) = 1889.85 kN*m
# Нетральная ось в верхней полке
M_Rd.f2 := -R_b*b_sl*h_f*h_f/2 - R_y*(x_f2 - h_b)*b_f2*((x_f2 - h_b)/2 + h_b) + R_y*(h_b + t_f2 - x_f2)*b_f2*((h_b + t_f2 - x_f2)/2 + x_f2) + R_y*t_w*h_w*(h_b + t_f2 + h_w/2) + R_y*A_f1.st*(h_b + t_f2 + h_w + t_f1/2) = 1321.73 kN*m
# Нейтральная ось в стенке
M_Rd.w := -R_b*b_sl*h_f*h_f/2 - R_y*A_f2.st*(h_b + t_f2/2) + (-R_y)*t_w*(x_w - h_b - t_f1)*((x_w - h_b - t_f1)/2 + h_b + t_f2) + R_y*t_w*(h_b + t_f2 + h_w - x_w)*((h_b + t_f2 + h_w - x_w)/2 + h_b + t_f2 + h_w/2) + R_y*A_f1.st*(h_b + t_f2 + h_w + t_f1/2) = 4044.27 kN*m
M_Rd :=
    M_Rd.b if NALocation == "Железобетонная плита"
    M_Rd.f2 if NALocation == "Верхняя полка"
    M_Rd.w if NALocation == "Стенка"
    "Решения не существует" otherwise
M_Rd = 1889.85 kN*m
КИ_rigid_plast :=
    "Решения не существует" if M_Rd == "Решения не существует"
    M/M_Rd otherwise
КИ_rigid_plast = 0.81585
# 2.4.3 Проверка на поперечную силу
Q_Rd := 0.58*R_y*t_w*h_w
Q_Rd = 545.715 kN
КИ_shear := Q/Q_Rd
КИ_shear = 0.627855
# 3. Результат
# 3.1 Геометрические характеристики сталежелезобетонного сечения
# Площадь
A_red = 609.618 cm^2
# Момент инерции
J_red = 515927 cm^4
# Момент сопротивления верхняя полка
W_f2.red = 60552 cm^3
# Момент сопротивления нижняя полка
W_f1.red = 8257.53 cm^3
# Момент сопротивления Ц.Т. сталежелезобетона
W_b.red = 27857.2 cm^3
# 3.2 Внутренние усилия
# Первая стадия
M_1 = 393.66 kN*m
Q_1 = 87.48 kN
# Вторая стадия
M_2 = 1148.17 kN*m
Q_2 = 255.15 kN
# Суммарно
M = 1541.84 kN*m
Q = 342.63 kN
# 3.3 Проверка прочности поперечного сечения по нормальным напряжениям
# 3.3.1 С учётом пластической работы
# Верхняя полка стального сечения
КИ_u.fl = 0.296559
# Нижняя полка стального сечения
КИ_l.fl = 0.73185
# Сталежелезобетон
КИ_concrete = "не применимо"
# 3.3.2 Жёсткопластическая теория
КИ_rigid_plast = 0.81585
