# РАСЧЁТ СТАЛЕЖЕЛЕЗОБЕТОННОЙ БАЛКИ В СООТВЕТСТВИИ С СП 266.1325800.2016
# Composite Beam v. 2.1
# 0. Расчётная модель
# - Балка рядовая
# - Опалубка: профилированной настил или щиты
# - Второстепенные балки не предусмотрены
# - Положительный изгибающий момент
# - Объединение-упоры Нельсона
# - Проверка устойчивости балки на 1 стадии не выполняется
# 1. Исходные данные
# 1.1 Материалы
# 1.1.1 Стальное сечение
# Модуль упругости стали
E_st := 206000*MPa
# Нормативный предел текучести стали
R_y.n := 355*MPa
# Коэффициент надёжности по материалу
γ_m := 1.025
# Расчётный предел текучести стали
R_y := R_y.n/γ_m
R_y = 346.341 MPa
# 1.1.2 Плита
# Модуль упругости бетона
E_b := 32500*MPa
# Нормативное сопротивление бетона сжатию
R_b.n := 22*MPa
# Предельная отностительная деформация для сталежелезобетона
ε_b.lim := 0.0016
# Коэффициент ползучести бетона:
φ_b.cr := 2.3
# Коэффициент надёжности по бетону при сжатии
γ_b := 1.3
# Расчётное сопротивление бетона сжатию
R_b := R_b.n/γ_b
R_b = 16.9231 MPa
# Модуль деформаций бетона
E_b.τ := E_b/(1 + φ_b.cr)
E_b.τ = 9848.48 MPa
# Удельный вес бетонной смеси
γ := 2500*kgf/m^3
# 1.1.3 Араматура
# Модуль упругости арматуры
E_s := 2.00*10^5*MPa
# Нормативное сопротивление арматуры
R_s.n := 500*MPa
# Диаметр арматуры
d_s := 0*mm
# Шаг арматуры:
b_s := 200*mm
# Защитный слой верхней арматуры
a_s.u := 50*mm
# Защитный слой нижней арматуры:
a_s.l := 50*mm
# Количество рядов арматуры
n_row.rebar := 2
# Коэффициент надёжности по арматуре
γ_s := 1.15
# Расчётное значение сопротивления арматуры
R_s := R_s.n/γ_s
# 1.2. Геометрия
# 1.2.1 Балка
# 1.2.1.1 Сечение
# Номер профиля | 35*Б2
# Высота двутавра
h_st := 350*mm
# Толщина стенки
t_w := 7*mm
# Ширина верхней полки
b_f2 := 175*mm
# Толщина врехней полки
t_f2 := 11*mm
# Ширина нижней полки
b_f1 := 175*mm
# Толщина нижней полки
t_f1 := 11*mm
# Площадь
A_st := 63.14*cm^2
# Момент инерции
I_st := 13559*cm^4
# Момент сопротивления крайних волокон верхней полки
W_f2.st := 774.8*cm^3
# Момент сопротивления крайних волокон нижней полки
W_f1.st := 774.8*cm^3
# Расстояние от Ц.Т. до наружной грани верхней полки
Z_f2.st := 17.5*cm
# Расстояние от Ц.Т. до наружной грани нижней полки
Z_f1.st := 17.5*cm
# Собственный вес балки
SW_steel_beam := 49.6*kgf/m
# 1.2.1.2 Пролёт балки
l_beam := 8*m
# 1.2.1.3 Шаг балок
B := 3*m
# 1.2.2 Плита
# Тип опалубки
formwork_type := "corrugated_sheet"
# 1 – "flat"
# 2 – "corrugated_sheet"
# Марка настила
name := "H75-750-0.8"
# Высота настила
h_n := 75*mm
# Толщина железобетона над настилом
h_f := 95*mm
# Параметры профилированного настила (применяются при form_work_type = 2)
# Шаг нижних полок
S_n := 187.5*mm
# Ширина нижней полки
b := 92*mm
# Расстояние между внутренними гранями верхних полок
b_ap := 137.5*mm
# Расстояние между полками по средней плоскости настила
b_0 := 114.75*mm
# Ориентация настила относительно балки
sheet_orient := "transverse"
# 1 – "along"
# 2 – "transverse"
# Собственный вес настила
SW_corrugated_sheet := 11.2*kgf/m^2
# 1.3 Объединение стальной и железобетонной частей с помощью упор. Нельсона
# Предел текучести упора
R_y.stud := 350*MPa
# Диаметр анкера
d_an := 2.2*cm
# Длина анкера
l_an := 12.5*cm
# Координата упора слева от проверяемого (начало координат – левая опора)
x_stud.l := 0*mm
# Координата проверяемого упора (начало координат – левая опора)
x_stud := 188*mm
# Координата упора справа от проверяемого (начало координат – левая опора)
x_stud.r := 376*mm
# Количество упоров в одной гофре
num_studs := "one_stud"
# 1.4 Нагрузки и коэффициенты надёжности на нагрузке
# 1.4.1 Нагрузки
# 1.4.1.1 Первая стадия
# Дополнительная нагрузка от веса бетона
SW_add.concrete := 0.26*kN/m^2
# Монтажная нагрузка
q_1a.DL := 0.5*kN/m^2
# 1.4.1.2 Вторая стадия
# Постоянная нагрузка
q_2.DL := 2*kN/m^2
# Временная нагрузка
q_2.LL := 4*kN/m^2
# Учёт неразрезности настила
k := 1.25
# 1.4.2 Коэффициенты надёжности по нагрузке
# Собственный вес стальных конструкций
γ_f.steel := 1.05
# Собственный вес свежеуложенного бетона
γ_f.concrete := 1.2
# Дополнительная нагрузка от веса бетона
γ_f.add.concrete := 1.1
# Монтажная нагрузка
γ_f.1.DL := 1.3
# Постоянная нагрузка II стадии
γ_f.2.DL := 1.2
# Временная нагрузка II стадии
γ_f.LL := 1.2
# 1.5 Коэффициенты условий работы
# Коэффициент условий работы стального элемента СП 16.13330
γ_c := 1
# Коэффициент условий работы бетона СП 63.13330
γ_bi := 1
# Коэффициент условий работы арматуры по СП 63.13330
γ_si := 1
# 1.6 Дополнительные воздействия
# Уравновешенные напряжения, возникающие на уровне центра тяжести поперечного сечения бетона от его ползучести, обжатия поперечных швов сборной плиты, усадки бетона и изменений температуры
σ_bi := 0*MPa
σ_si := 0*MPa
# 2.Расчёт
# 2.1. Геометрические характеристики
# 2.1.1 Стальное сечение
h_w := h_st - t_f1 - t_f2
h_w = 32.8 cm
A_w.st := h_w*t_w
A_w.st = 22.96 cm^2
A_f1.st := b_f1*t_f1
A_f1.st = 19.25 cm^2
A_f2.st := b_f2*t_f2
A_f2.st = 19.25 cm^2
# Условный момент сопротивления на уровне центра тяжести сечения бетона
W_b.st := I_st/(Z_f2.st + h_n + h_f/2)
W_b.st = 455.765 cm^3
# 2.1.2 Бетонное сечение
# Половина ширины контакта железобетонной плиты и стального пояса
a := b_f1/2
a = 0.0875 m
# Расчётная толщина бетона
t_sl := h_f
t_sl = 95 mm
# Расчётная ширина железобетонной плиты
b_sl := 2*{
    B/2 if l_beam ≥ 4*B
    max(min(a + 6*t_sl, B/2), l_beam/8) otherwise
}
b_sl = 2 m
# Расчётная площадь сечения железобетонной плиты
A_b := b_sl*t_sl
A_b = 190000 mm^2
# Момент инерции железобетонной плиты
I_b := b_sl*t_sl^3/12
I_b = 14289.6 cm^4
# Площадь арматуры на единицу длины
A_s := (π*d_s^2/4)/b_s
A_s = 0 cm^2/m
# 2.1.3 Композитное сечение
# 2.1.3.1 Композитное сечение для проверки балки
# Коэффициент приведения
α_b := E_st/E_b.τ
α_b = 20.9169
# Коэффициент приведения
α_s := E_st/E_s
α_s = 1.03
# Высота композитного сечения
H_stb := h_st + h_n + h_f
H_stb = 520 mm
# Площадь сталежелезобетонного сечения
A_red := A_st + A_b/α_b + n_row.rebar*1/α_s*(A_s*b_sl)
A_red = 15397.6 mm^2
# Расстояние от наружней грани полки до Ц.Т. плиты
C_b := h_n + h_f/2
C_b = 122.5 mm
# Расстояние от наружней грани полки до верхней грани плиты
h := h_n + h_f
h = 170 mm
# Расстояние между центрами тяжести плиты и стальной балки
Z_b.st := C_b + Z_f2.st
Z_b.st = 297.5 mm
Z_st.r_u := Z_f2.st + h - a_s.u
Z_st.r_u = 295 mm
Z_st.r_l := Z_f2.st + a_s.l
Z_st.r_l = 225 mm
# Статический момент инерции сталежелезобетонного сечения относительно Ц.Т. стального сечения
S_red := 1/α_b*A_b*Z_b.st + 1/α_s*A_s*b_sl*(Z_st.r_u + Z_st.r_l)
S_red = 2702357 mm^3
# Расстояние между центром тяжести стального и сталежелезобетонного сечения
Z_st.red := S_red/A_red
Z_st.red = 175.506 mm
Z_b.red := Z_b.st - Z_st.red
Z_b.red = 121.994 mm
Z_red.r_u := Z_b.red + h_f/2 - a_s.u
Z_red.r_u = 119.494 mm
Z_red.r_l := Z_b.red - h_f/2 + a_s.l
Z_red.r_l = 124.494 mm
# Момент инерции сталежелезобетонного сечения приведённого к металлу
I_red := I_st + A_st*Z_st.red^2 + 1/α_b*I_b + 1/α_b*A_b*Z_b.red^2 + 1/α_s*A_s*b_sl*(Z_red.r_u^2 + Z_red.r_l^2)
I_red = 472093985 mm^4
# Расстояние между Ц.Т. сталежелезобетонного сечения и наружней гранью верхней полки
Z_red.f2 := Z_f2.st - Z_st.red
Z_red.f2 = -0.505623 mm
# Расстояние между Ц.Т. сталежелезобетонного сечения и наружней гранью нижней полки
Z_red.f1 := Z_st.red + Z_f1.st
Z_red.f1 = 350.506 mm
# Момент сопротивления сталежелезобетонного сечения для верхней полки
W_f2.red := I_red/Z_red.f2
W_f2.red = -933687 cm^3
# Момент сопротивления сталежелезобетонного сечения для нижней полки
W_f1.red := I_red/Z_red.f1
W_f1.red = 1346.89 cm^3
# Момент сопротивления сталежелезобетонного сечения для Ц.Т. железобетонной плиты
W_b.red := I_red/Z_b.red
W_b.red = 3869.8 cm^3
# 2.1.3.2 Композитное сечение для проверки упоров
# Коэффициент приведения
α_b.0 := E_st/E_b
α_b.0 = 6.33846
# Площадь сталежелезобетонного сечения
A_red.0 := A_st + A_b/α_b.0 + n_row.rebar*1/α_s*(A_s*b_sl)
A_red.0 = 36289.7 mm^2
# Статический момент инерции сталежелезобетонного сечения относительно Ц.Т. стального сечения
S_red.0 := 1/α_b.0*A_b*Z_b.st + 1/α_s*A_s*b_sl*(Z_st.r_u + Z_st.r_l)
S_red.0 = 8917779 mm^3
# Расстояние между центром тяжести стального и сталежелезобетонного сечения
Z_st.red.0 := S_red.0/A_red.0
Z_st.red.0 = 245.738 mm
Z_b.red.0 := Z_b.st - Z_st.red.0
Z_b.red.0 = 51.7616 mm
Z_red.r_u.0 := Z_b.red.0 + h_f/2 - a_s.u
Z_red.r_u.0 = 49.2616 mm
Z_red.r_l.0 := Z_b.red.0 - h_f/2 + a_s.l
Z_red.r_l.0 = 54.2616 mm
# Момент инерции сталежелезобетонного сечения приведённого к металлу
I_red.0 := I_st + A_st*Z_st.red.0^2 + 1/α_b.0*I_b + 1/α_b.0*A_b*Z_b.red.0^2 + 1/α_s*A_s*b_sl*(Z_red.r_u.0^2 + Z_red.r_l.0^2)
I_red.0 = 619732911 mm^4
# Момент сопротивления сталежелезобетонного сечения для Ц.Т. железобетонной плиты
W_b.red.0 := I_red.0/Z_b.red.0
W_b.red = 3869.8 cm^3
# 2.2 Нагрузки
# Приведённая толщина бетона в пределах высоты сечения настила
h_b :=
    (b + b_ap)/(2*S_n)*h_n if formwork_type == "corrugated_sheet"
    0 if formwork_type == "flat"
    "Wrong formwork type" otherwise
# Собственный вес свежеуложенной бетонной смеси
q_b := γ*(h_f + h_b)
q_b = 3.45439 kPa
# Расчётная нагрузка 1a стадия
q_1a := γ_f.steel*SW_steel_beam + k*(γ_f.steel*SW_corrugated_sheet*B + γ_f.concrete*q_b*B + γ_f.add.concrete*SW_add.concrete*B + γ_f.1.DL*q_1a.DL*B)
q_1a = 19.998 kN/m
# Расчётная нагрузка 1b стадия
q_1b := γ_f.steel*SW_steel_beam + k*(γ_f.steel*SW_corrugated_sheet*B + γ_f.concrete*q_b*B + γ_f.add.concrete*SW_add.concrete*B)
q_1b = 17.5605 kN/m
# Расчётная нагрузка 2 стадия
q_2 := (γ_f.2.DL*q_2.DL + γ_f.LL*q_2.LL)*B
q_2 = 21.6 kN/m
# 2.3 Внутренние усилия в расчётных сечениях
# Сечение с максимальным изгибающим моментом
# 1a стадия | 1b стадия
# Расчётный изгибающий момент | Расчётный изгибающий момент
M_1a := q_1a*l_beam^2/8
M_1a = 159.984 kN*m
M_1b := q_1b*l_beam^2/8
M_1b = 140.484 kN*m
# 2 стадия
# Расчётный изгибающий момент
M_2 := q_2*l_beam^2/8
M_2 = 172.8 kN*m
# Суммарный изгибающий момент
M := M_1b + M_2
M = 313.284 kN*m
# Сечение с максимальной поперечной силой
# I стадия | II стадия
# Расчётная поперечная сила | Расчётная поперечная сила
Q_1 := q_1b*l_beam/2
Q_2 := q_2*l_beam/2
Q_1 = 70.2419 kN
Q_2 = 86.4 kN
# Суммарная поперечная сила
Q := Q_1 + Q_2
Q = 156.642 kN
# 2.4 Проверка прочности поперечного сечения по нормальным напряжениям
# 2.4.1 С учётом пластической работы
# 2.4.1.1 Определение напряжений в бетоне и арматуре
# Напряжения в бетоне
σ_b := M_2/(α_b*W_b.red) - σ_bi
σ_b = 2.1348 MPa
# Напряжения в расчётной продольной арматуре
σ_s := M_2/(α_s*W_b.red) + σ_si
σ_s = 43.3529 MPa
# 2.4.1.2 Усилия воспринимаемые совместно бетоном с арматурой при различном уровне загружения
N_b.s := A_b*σ_b + A_s*n_row.rebar*b*σ_s
N_b.s = 405.612 kN
N_bR.s := A_b*R_b + A_s*n_row.rebar*b*σ_s
N_bR.s = 3215.38 kN
N_bR.sR := A_b*R_b + A_s*n_row.rebar*b*R_s
N_bR.sR = 3215.38 kN
# Коэффициент условий работы верхнего стального пояса, учитывающий его разгрузку прилегающим недонапряженным бетоном и принимаемый не более 1.2
γ_1 := min(1 + (γ_bi*R_b - σ_b)/(γ_c*R_y)*A_b/A_f2.st, 1.2)
# 2.4.1.3 Верхний пояс
КИ_u.fl :=
    ((M - Z_b.st*N_b.s)/W_f2.st - N_b.s/A_st)/(γ_1*γ_c*R_y) if σ_b < γ_bi*R_b and σ_s < γ_si*R_s
    ((M - Z_b.st*N_bR.sR)/W_f2.st - N_bR.sR/A_st)/(γ_c*R_y) if σ_b ≥ γ_bi*R_b and σ_s < γ_si*R_s
    ((M - Z_b.st*N_bR.sR)/W_f2.st - N_bR.sR/A_st)/(γ_c*R_y) if σ_b ≥ γ_bi*R_b and σ_s ≥ γ_si*R_s
КИ_u.fl = 0.443585
# 2.4.1.4 Нижний пояс
КИ_l.fl :=
    ((M - Z_b.st*N_b.s)/W_f1.st + N_b.s/A_st)/(γ_c*R_y) if σ_b < γ_bi*R_b and σ_s < γ_si*R_s
    ((M - Z_b.st*N_bR.s)/W_f1.st + N_bR.s/A_st)/(γ_c*R_y) if σ_b ≥ γ_bi*R_b and σ_s < γ_si*R_s
    ((M - Z_b.st*N_bR.sR)/W_f1.st + N_bR.sR/A_st)/(γ_c*R_y) if σ_b ≥ γ_bi*R_b and σ_s ≥ γ_si*R_s
КИ_l.fl = 0.903267
# 2.4.1.5 Проверка напряжений в железобетонной части сечения
# Коэффициент, учитывающий увеличение относительных деформаций бетона при развитии пластических деформаций
σ_0 := (M - Z_b.st*N_bR.sR)/W_f2.st
σ_0 = -830.27 MPa
k :=
    1 if σ_0 ≤ γ_c*R_y
    (1 + 0.009*E_st/(γ_c*R_y)) if σ_0 > γ_c*R_y + N_bR.sR/A_st
    linterp([γ_c*R_y; γ_c*R_y + N_bR.sR/A_st], [1; 1 + 0.009*E_st/(γ_c*R_y)], σ_0) if σ_0 ≤ γ_c*R_y and σ_0 < γ_c*R_y + N_bR.sR/A_st
k = -11.3683
# Условный момент сопротивления на уровне центра сечения бетона
КИ_concrete :=
    "не применимо" if σ_b < γ_bi*R_b and σ_s < γ_si*R_s
    "не применимо" if σ_b ≥ γ_bi*R_b and σ_s < γ_si*R_s
    k/E_st*((M_2 - Z_b.st*N_bR.sR)/W_b.st - N_bR.sR/A_st)/ε_b.lim if σ_b ≥ γ_bi*R_b and σ_s ≥ γ_si*R_s
КИ_concrete = "не применимо"
# 2.4.2 Жёсткопластический материал
# Нейтральная ось в железобетонной плите
x_b := R_y*(A_w.st + A_f1.st + A_f2.st)/(R_b*b_sl) = 62.8909 mm
x_b = 62.8909 mm
# Нейтральная ось в верхней полке
x_f2 := (A_f1.st*R_y + (h + t_f2)*b_f2*R_y + A_w.st*R_y + h*b_f2*R_y - R_b*A_b)/(2*b_f2*R_y) = 161.035 mm
# Нейтральная ось пересекает стенку
x_w := (A_f1.st*R_y + (h + t_f2 + h_w)*t_w*R_y + (h + t_f2)*t_w*R_y - R_b*A_b - A_f2.st*R_y)/(2*t_w*R_y) = -318.133 mm
x_NA :=
    if x_b ≥ 0 and x_b ≤ h_f
        x_b
        break
    if x_f2 ≥ h and x_f2 < (h + t_f2)
        x_f2
        break
    if x_w ≥ (h + t_f2) and x_w ≤ (h + t_f2 + h_w)
        x_w
        break
    "Решение не существует" otherwise
x_NA = 62.8909 mm
NALocation :=
    if x_b ≥ 0 and x_b ≤ h_f
        "Железобетонная плита"
        break
    if x_f2 ≥ h and x_f2 < (h + t_f2)
        "Верхняя полка"
        break
    "Стенка" if x_w ≥ (h + t_f2) and x_w ≤ (h + t_f2 + h_w)
    "Решение не существует" otherwise
NALocation = "Железобетонная плита"
# Определение моментов
# Нейтральная ось в железобетонной плите
M_Rd.b := -R_b*b_sl*x_NA*x_NA/2 + R_y*A_f2.st*(h + t_f2/2 - x_NA) + R_y*A_w.st*(h + t_f2 + h_w/2 - x_NA) + R_y*A_f1.st*(h + t_f2 + h_w + t_f1/2 - x_NA) = 533.566 kN*m
# Нетральная ось в верхней полке
M_Rd.f2 := -R_b*b_sl*t_sl*(x_NA - t_sl/2) - R_y*(x_NA - h)*b_f2*(x_NA - h)/2 + R_y*(h + t_f2 - x_NA)*b_f2*((h + t_f2 - x_NA)/2) + R_y*t_w*h_w*(h + t_f2 + h_w/2 - x_NA)/2 + R_y*A_f1.st*(h + t_f2 + h_w + t_f1/2 - x_NA) = 438.847 kN*m
# Нейтральная ось в стенке
M_Rd.w := -R_b*b_sl*t_sl*(x_NA - t_sl/2) - R_y*A_f2.st*(x_NA - h - t_f2/2) + (-R_y)*t_w*(x_NA - h - t_f2)*(x_NA - h - t_f2)/2 + R_y*t_w*(h + t_f2 + h_w - x_NA)*(h + t_f2 + h_w - x_NA)/2 + R_y*A_f1.st*(h + t_f2 + h_w + t_f1/2 - x_NA) = 551.014 kN*m
M_Rd :=
    if NALocation == "Железобетонная плита"
        M_Rd.b
        break
    if NALocation == "Верхняя полка"
        M_Rd.f2
        break
    if NALocation == "Стенка"
        M_Rd.w
        break
    "Решения не существует" otherwise
M_Rd = 533.566 kN*m
КИ_rigid_plast :=
    "Решения не существует" if M_Rd == "Решения не существует"
    M/M_Rd otherwise
КИ_rigid_plast = 0.587151
# 2.5 Проверка на поперечную силу
Q_Rd := 0.58*R_y*t_w*h_w
Q_Rd = 461.216 kN
КИ_shear := Q/Q_Rd
КИ_shear = 0.339628
# 2.6 Проверка на действие изгибающих моментов при монтаже
КИ_erect := M_1a/(min(W_f1.st, W_f2.st)*R_y*γ_c)
КИ_erect = 0.596186
# 2.7 Проверка упоров
# 2.7.1 Определение сдвигающей силы воспринимаемой упором
# Определение координат расчётных сечений для вычисления нормальных напряжений
# Слева от упора | Справа от упора
x_σ.l := (x_stud - x_stud.l)/2
x_σ.r := x_stud + (x_stud.r - x_stud)/2
x_σ.l = 94 mm
x_σ.r = 282 mm
# Определение моментов в расчётных сечениях
# Слева от упора | Справа от упора
M_x.σ.l := q_2*l_beam/2*x_σ.l - q_2*x_σ.l*x_σ.l/2
M_x.σ.r := q_2*l_beam/2*x_σ.r - q_2*x_σ.r*x_σ.r/2
M_x.σ.l = 8.02617 kN*m
M_x.σ.r = 23.5059 kN*m
# Определение напряжений в расчётных сечениях
# Слева от упора
σ_x.σ.l.r := M_x.σ.l/(α_b.0*W_b.red.0) - σ_bi
σ_x.σ.l.s := M_x.σ.l/(α_s*W_b.red.0) - σ_bi
σ_x.σ.l.r = 0.105762 MPa
σ_x.σ.l.s = 0.65084 MPa
# Справа от упора
σ_x.σ.r.r := M_x.σ.r/(α_b.0*W_b.red.0) - σ_bi
σ_x.σ.r.s := M_x.σ.r/(α_s*W_b.red.0) - σ_bi
σ_x.σ.r.r = 0.30974 MPa
σ_x.σ.r.s = 1.90609 MPa
# Определение сдвигающей силы воспринимаемой упором
S_stud := (σ_x.σ.r.r*A_b + σ_x.σ.r.s*A_s*b_sl) - (σ_x.σ.l.r*A_b + σ_x.σ.l.s*A_s*b_sl)
S_stud = 38.7559 kN
# 2.7.2 Определение предельной сдвигающей силы воспринимаемой упором
# Полная высота упора
h_an := min(h_n + 75*mm, l_an)
h_an = 125 mm
S_h := 0.063*d_an^2/cm^2*γ_c*R_y.stud/MPa*kN
S_h = 106.722 kN
# Коэффициент снижающий несущую способность упоров при настиле
n_r :=
    1 if num_studs == "one_stud"
    2 if num_studs == "more_than_one_stud"
k_t :=
    1 if formwork_type == "flat"
    |0.7*b_0*(h_an - h_n)/(h_n^2*sqrt(n_r))| if formwork_type == "corrugated_sheet"
k_t = 0.714
k_l :=
    1 if formwork_type == "flat"
    |0.6*b_0*(h_an - h_n)/h_n^2| if formwork_type == "corrugated_sheet"
k_l = 0.612
P_rd_ :=
    0.24*l_an/cm*d_an/cm*sqrt(10*R_b/MPa)*kN if l_an/d_an ≥ 2.5 and l_an/d_an ≤ 4.2
    d_an^2/cm^2*sqrt(10*R_b/MPa)*kN if l_an/d_an > 4.2
P_rd := {
    k_t if sheet_orient == "transverse"
    k_l if sheet_orient == "along"
}*P_rd_
P_rd = 44.9555 kN
# 2.7.2 Коэффициент использования упора
КИ_stud := S_stud/min(S_h, P_rd)
КИ_stud = 0.862093
# 3. Результат
# 3.1 Геометрические характеристики сталежелезобетонного сечения
# Площадь
A_red = 153.976 cm^2
# Момент инерции
I_red = 47209.4 cm^4
# Момент сопротивления Ц.Т. плиты
W_b.red = 3869.8 cm^3
# Расстояние
Z_b.red = 121.994 mm
# Расстояние
# Расстояние
Z_st.red = 175.506 mm
# Расстояние
# Расстояние
Z_b.st = 297.5 mm
# 3.2 Внутренние усилия
# Первая стадия
M_1a = 159.984 kN*m
M_1b = 140.484 kN*m
# Вторая стадия
M_2 = 172.8 kN*m
# Суммарно
M = 313.284 kN*m
Q = 156.642 kN
# 3.3  Проверка на действие изгибающих моментов при монтаже
# Прочность
КИ_erect = 0.596186
# 3.4 Проверка на действие изгибающих моментов, раздел 6.2.1
# Верхняя полка стального сечения
КИ_u.fl = 0.443585
# Нижняя полка стального сечения
КИ_l.fl = 0.903267
# Сталежелезобетон
КИ_concrete = "не применимо"
# 3.5 Проверка а действие изгибающих моментов
# (жёсткопластический материал), п. 6.2.1.6
# Положение нейтральной оси
NALocation = "Железобетонная плита"
# Прочность балки
КИ_rigid_plast = 0.587151
# 3.6 Проверка на действие поперечной силы
# Прочность балки
КИ_shear = 0.339628
# 3.3.3 Проверка упора
# Расчёт по прочности
КИ_stud = 0.862093
