# РАСЧЁТ СТАЛЕЖЕЛЕЗОБЕТОННОЙ БАЛКИ В СООТВЕТСТВИИ С СП 35.13330.2011
# Composite Beam v. 1.2
# 1. Исходные данные
# 1.1 Материалы
# 1.1.1 Стальное сечение
# Сталь балки
Сталь := "С390Б"
R_y :=
    (320*MPa) if Сталь == "С345"
    (380*MPa) if Сталь == "С390Б"
# Модуль упругости стали
E_st := 2099898*kgf/cm^2
# Расчётный предел текучести стали
R_y = 3874.92 kgf/cm^2
# 1.1.2 Плита
Бетон := "В30"
R_b :=
    (8.5*MPa) if Бетон == "В15"
    (11.5*MPa) if Бетон == "В20"
    (14.5*MPa) if Бетон == "В25"
    (17*MPa) if Бетон == "В30"
E_b0 :=
    (24000*MPa) if Бетон == "В15"
    (27500*MPa) if Бетон == "В20"
    (30000*MPa) if Бетон == "В25"
    (32500*MPa) if Бетон == "В30"
# Расчётное сопротивление бетона сжатию
R_b = 173.352 kgf/cm^2
# Начальный модуль упругости бетона
E_b0 = 331408 kgf/cm^2
# Предельная относительная деформация для сталежелезобетона
ε_b.lim := 0.0016
# 1.1.3 Арматура
Марка := "А240"
R_s :=
    (210*MPa) if Марка == "А240"
    (435*MPa) if Марка == "А500"
# Марка арматуры
# Модуль упругости арматуры
E_rs := 2038735*kgf/cm^2
# Расчётное сопротивление арматуры
R_s = 2141.4 kgf/cm^2
# 1.2. Геометрия
# 1.2.1 Балка
# Сечение
Балка := "70Б2"
I_s :=
    87546.5*cm^4 if Балка == "60ДБ4"
    98536.49*cm^4 if Балка == "60ДБ5"
    111971*cm^4 if Балка == "60ДБ6"
    126193*cm^4 if Балка == "60Ш2"
    125922*cm^4 if Балка == "70Б1"
    147101*cm^4 if Балка == "70Б2"
W_s :=
    2879.8*cm^3 if Балка == "60ДБ4"
    3220*cm^3 if Балка == "60ДБ5"
    3629*cm^3 if Балка == "60ДБ6"
    4285*cm^3 if Балка == "60Ш2"
    3645*cm^3 if Балка == "70Б1"
    4221*cm^3 if Балка == "70Б2"
h_s :=
    608*mm if Балка == "60ДБ4"
    612*mm if Балка == "60ДБ5"
    617*mm if Балка == "60ДБ6"
    589*mm if Балка == "60Ш2"
    691*mm if Балка == "70Б1"
    697*mm if Балка == "70Б2"
b_f :=
    228*mm if Балка == "60ДБ4"
    229*mm if Балка == "60ДБ5"
    230*mm if Балка == "60ДБ6"
    300*mm if Балка == "60Ш2"
    260*mm if Балка == "70Б1"
    260*mm if Балка == "70Б2"
A_s :=
    144.49*cm^2 if Балка == "60ДБ4"
    159.32*cm^2 if Балка == "60ДБ5"
    178.52*cm^2 if Балка == "60ДБ6"
    217.41*cm^2 if Балка == "60Ш2"
    164.74*cm^2 if Балка == "70Б1"
    186.94*cm^2 if Балка == "70Б2"
t_f :=
    17.3*mm if Балка == "60ДБ4"
    19.6*mm if Балка == "60ДБ5"
    22.2*mm if Балка == "60ДБ6"
    20.5*mm if Балка == "60Ш2"
    15.5*mm if Балка == "70Б1"
    18.5*mm if Балка == "70Б2"
# Высота балки
h_s = 697 mm
# Ширина пояса балки
b_f = 260 mm
# Толщина полки
t_f = 18.5 mm
# Площадь балки
A_s = 186.94 cm^2
# Пролёт балки
l_beam := 17.885*m
# Шаг балок
B := 5.1*m
# 1.2.2 Плита
h_п := 35*mm
# Высота настила  над верхним поясом балки
# Толщина железобетона над настилом
h_f := 90*mm
# 1.2.3 Армирование
d_r := 6*mm
A_d :=
    (0.126*cm^2) if d_r == 4*mm
    (0.196*cm^2) if d_r == 5*mm
    (0.283*cm^2) if d_r == 6*mm
    (0.503*cm^2) if d_r == 8*mm
    (0.785*cm^2) if d_r == 10*mm
# Диаметр арматурных стержней
# Шаг арматурных стержней
l_r := 100*mm
# Толщина защитного слоя
a_r := 15*mm
# Площадь одгого стержня
A_d = 0.283 cm^2
# 1.3 Объединение стальной и железобетонной частей с помощью упор. Нельсона
# Диаметр анкера
d_an := 22*mm
# Длина анкера
l_an := 100*mm
# 1.4 Нагрузки и коэффициенты надёжности на нагрузке
# 1.4.1 Нагрузки
# 1.4.1.1 Первая стадия
# Нормативная постоянная нагрузка
q_1.DL := 390*kgf/m^2
# 1.4.1.2 Вторая стадия
# Нормативная постоянная нагрузка
q_2.DL := 0*kgf/m^2
# Нормативная временная нагрузка
q_LL := 377*kgf/m^2
# Продольная сила на уровне центра тяжести балки
N_e := 10000*kgf
# 1.4.2 Коэффициенты надёжности по нагрузке
# Постоянная нагрузка первая стадия
γ_f.1.DL := 1.09
# Постоянная нагрузка вторая стадия
γ_f.2.DL := 1.2
# Временная кратковременная нагрузка
γ_f.LL := 1.2
# 1.5 Коэффициенты условий работы
# Коэффициент условий работы стального элемента СП 16.13330
γ_c := 1
# Коэффициент условий работы бетона СП 63.13330
γ_bi := 0.9
# Коэффициент условий работы арматуры по СП 63.13330
γ_si := 1
# 2.Расчёт на прочность
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# 2.1.1. Стальное сечение - балка
W_s1.s := W_s = 4221 cm^3  # - момент сопротивления относительно нижней полки
W_s2.s := W_s = 4221 cm^3  # - момент сопротивления относительно верхней полки
# Площадь сечения нижней полки
A_s1 := b_f*t_f = 48.1 cm^2
# Площадь сечения верхней полки
A_s2 := b_f*t_f = 48.1 cm^2
# Площадь сечения стенки
A_w := A_s - A_s1 - A_s2 = 90.74 cm^2
# 2.1.2. Бетонное сечение - плита
# Модуль деформации бетона по п. 7.32 СП 35.13330.2011, работающего в условиях попеременного замораживания и оттаивания:
E_b := 0.9*E_b0 = 298267 kgf/cm^2
# Половина ширины контакта плиты и стального пояса
a := b_f/2
a = 130 mm
# Расчётная толщина бетона
t_sl := h_f
t_sl = 90 mm
# Расчётная ширина свеса железобетонной плиты (таблица 4.1 СП)
b :=
    B/2 if l_beam ≥ 4*B
    max(min(a + 6*t_sl, B/2), l_beam/8) otherwise
b = 2235.62 mm
# Расчётная ширина железобетонной плиты
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b_sl := 2*b
b_sl = 4.47125 m
# Площадь бетонного сечения
A_b := b_sl*t_sl + b_f*h_п
A_b = 4115.12 cm^2
# 2.1.3. Армирование плиты
# Количество арматурных стержней армирования
n := b_sl/l_r = 44.7125
# Площадь арматурных стержней армирования плиты
A_r := A_d*n = 12.6536 cm^2
# 2.1.3 Композитное сечение
# Коэффициент приведения бетона к стали
n_b := E_st/E_b
n_b = 7.04033
# Коэффициент приведения арматуры к стали
n_r := E_st/E_rs
n_r = 1.03
# Расстояния в соответствии с рис. 9.3 СП 35.13330.2011:
# Расстояние от Ц.Т. стального сечения Cs до нижней полки
Z_s1.s := h_s/2
Z_s1.s = 348.5 mm
# Расстояние от Ц.Т. стального сечения Cs до верхней полки
Z_s2.s := h_s/2
Z_s2.s = 348.5 mm
# Расстояние от Ц.Т. железобетонного сечения Cb до Ц.Т. стального сечения Cs
Z_b.s := (b_sl*t_sl/n_b*(h_f/2 + h_п + h_s/2) + b_f*h_п/n_b*(h_п/2 + h_s/2) + A_r/n_r*(d_r/2 + a_r + h_п + h_s/2))/(A_b/n_b + A_r/n_r)
Z_b.s = 426.591 mm
# Расстояние от Ц.Т. композитного сечения Cstb до Ц.Т. стального сечения Cs
Z_s.stb := (b_sl*t_sl/n_b*(h_f/2 + h_п + h_s/2) + b_f*h_п/n_b*(h_п/2 + h_s/2) + A_r/n_r*(d_r/2 + a_r + h_п + h_s/2))/(A_b/n_b + A_r/n_r + A_s)
Z_s.stb = 324.838 mm
# Расстояние от Ц.Т. композитного сечения Cstb до Ц.Т. железобетонного сечения Cb
Z_b.stb := Z_b.s - Z_s.stb
Z_b.stb = 101.753 mm
# Момент инерции сталежелезобетонного сечения балки
I_stb := I_s + b_sl*t_sl^3/(n_b*12) + b_f*h_п^3/(n_b*12) + A_s*Z_s.stb^2 + (A_b/n_b + A_r/n_r)*Z_b.stb^2
I_stb = 410020 cm^4
# Момент сопротивления железобетонной части сечения:
W_b.stb := I_stb/Z_b.stb = 40295.8 cm^3
# Условный момент сопротивления на уровне центра тяжести сечения бетона
W_bs := I_s/Z_b.s = 3448.29 cm^3
# Площадь сталежелезобетонного сечения балки:
I_b := b_sl*t_sl^3/(n_b*12)
A_stb := A_b/n_b + A_r/n_r + A_s
A_stb = 783.732 cm^2
# Расчетная высота сечения
h := h_s + h_п + h_f = 822 mm
# 2.2 Нагрузки и воздействия
# 2.2.1. Усилия от вертикальных нагрузок
# Расчётная нагрузка I стадия
q_1 := γ_f.1.DL*q_1.DL*B
q_1 = 2168.01 kgf/m
# Расчётная нагрузка II стадия
q_2 := (γ_f.2.DL*q_2.DL + γ_f.LL*q_LL)*B
q_2 = 2307.24 kgf/m
# Сечение с максимальным изгибающим моментом
# I стадия | II стадия
# Изгибающий момент | Изгибающий момент | Момент от продольной силы
M_e := N_e*Z_s.stb
M_1 := q_1*l_beam^2/8
M_2 := q_2*l_beam^2/8
M_e = 324838 kgf*cm
M_1 = 8668604 kgf*cm
M_2 = 9225304 kgf*cm
q := q_1 + q_2 = 4475.25 kgf/m
# Суммарный изгибающий момент
M := M_1 + M_2 + M_e
M = 18218746 kgf*cm
# Сечение с максимальной поперечной силой
# I стадия | II стадия
# Расчётная поперечная сила | Расчётная поперечная сила
Q_1 := q_1*l_beam/2
Q_2 := q_2*l_beam/2
Q_1 = 19387.4 kgf
Q_2 = 20632.5 kgf
# Суммарная поперечная сила
Q := Q_1 + Q_2
Q = 40019.9 kgf
# 2.2.2 Напряжения от усадки бетона
# Предельная относительная деформация от усадки бетона
# для монолитной плиты:
ε_shr := 2*10^-4
# Условный модуль упругости бетона
E_ef.shr := 0.5*E_b = 149133 kgf/cm^2
# Коэффициент приведения бетона к стали
# при условном модуле упругости
n_b.shr := E_st/E_ef.shr = 14.0807
# Вычисление характеристик при модуле упругости E_ef.shr:
# Расстояние от Ц.Т. железобетонного сечения Cb до Ц.Т. стального сечения Cs
Z_bs.shr := (b_sl*t_sl/n_b.shr*(h_f/2 + h_п + h_s/2) + b_f*h_п/n_b.shr*(h_п/2 + h_s/2) + A_r/n_r*(d_r/2 + a_r + h_п + h_s/2))/(A_b/n_b.shr + A_r/n_r)
Z_bs.shr = 426.084 mm
# Расстояние от Ц.Т. композитного сечения Cstb до Ц.Т. стального сечения Cs
Z_s.stb.shr := (b_sl*t_sl/n_b.shr*(h_f/2 + h_п + h_s/2) + b_f*h_п/n_b.shr*(h_п/2 + h_s/2) + A_r/n_r*(d_r/2 + a_r + h_п + h_s/2))/(A_b/n_b.shr + A_r/n_r + A_s)
Z_s.stb.shr = 264.018 mm
# Расстояние от Ц.Т. композитного сечения Cstb до Ц.Т. железобетонного сечения Cb
Z_b.stb.shr := Z_bs.shr - Z_s.stb.shr
Z_b.stb.shr = 162.066 mm
# Момент инерции сталежелезобетонного сечения балки
I_stb.shr := I_s + b_sl*t_sl^3/(n_b.shr*12) + b_f*h_п^3/(n_b.shr*12) + A_s*Z_s.stb.shr^2 + (A_b/n_b.shr + A_r/n_r)*Z_b.stb.shr^2
# Площадь сталежелезобетонного сечения балки:
I_stb.shr = 359333 cm^4
A_stb.shr := A_b/n_b.shr + A_r/n_r + A_s
A_stb.shr = 491.479 cm^2
# Площадь стальной части сечения
A_st.shr := A_s + A_r = 199.594 cm^2
# Расстояние от центра тяжести A_stb.shr до центра тяжести A_st
Z_st.stb := Z_s.stb.shr - A_r/n_r*(d_r/2 + a_r + h_п + h_s/2)/(A_r/n_r + A_s)
Z_st.stb = 239.26 mm
# Статический момент стальной части сечения относительно Ц.Т. композитного сечения Cstb
S_shr := A_st.shr*Z_st.stb = 4775.47 cm^3
# Расчет напряжений в бетоне:
# Коэффициент
ν_shr.b := 0
# Расстояние от центра тяжести до крайней фибры бетона
Z_b.shr := -(h - (Z_s.stb.shr + Z_s1.s)) = -209.482 mm
σ_shr.b := ε_shr*E_ef.shr*(A_st.shr/A_stb.shr + S_shr/I_stb.shr*Z_b.shr - ν_shr.b) = 3.80918 kgf/cm^2  # - растяжение
# Расчет напряжений в арматуре:
# Коэффициент
ν_shr.rs := 1
# Расстояние от центра тяжести до арматуры:
Z_rs.shr := -(h - (Z_s.stb.shr + Z_s1.s) - (h_f - a_r)) = -134.482 mm
σ_shr.rs := ε_shr*E_ef.shr*(A_st.shr/A_stb.shr + S_shr/I_stb.shr*Z_rs.shr - ν_shr.rs) = -23.0446 kgf/cm^2  # - сжатие
# 2.2.3 Напряжения от ползучести бетона
# Площадь стальной части сечения, включая арматуру
A_st.kr := A_s + A_r/n_r = 199.225 cm^2
# Расстояние между Ц.Т. стальной балки и Ц.Т. A_st.kr
Z_s.st := A_r/n_r*(d_r/2 + a_r + h_п + h_s/2)/(A_s + A_r/n_r)
Z_s.st = 24.7582 mm
# Момент инерции стальной части сечения, включая арматуру
I_st := I_s + A_s*Z_s.st^2 + A_r/n_r*(d_r/2 + a_r + h_п + h_s/2 - Z_s.st)^2
I_st = 165684 cm^4
# Расстояние от Ц.Т. стальной части сечения Cst до Ц.Т. железобетонного сечения Cb
Z_b.st := Z_b.s - Z_s.st
Z_b.st = 401.832 mm
# Коэффициент надежности по нагрузке
γ_f := 1.1
# Нормативная деформация ползучести бетона
c_n := 84*10^-6*MPa^-1
# Предельная характеристика ползучести бетона
φ_kr := γ_f*E_b*c_n
φ_kr = 2.7027
# Параметр подталивости
ν := A_b/n_b*(1/A_st.kr + Z_b.st^2/I_st) = 8.6303
# Условный модуль упругости бетона
E_ef.kr := (ν - 0.5*φ_kr + 1)/((1 + φ_kr)*ν + 0.5*φ_kr + 1)*E_b
E_ef.kr = 71978.2 kgf/cm^2
# Вычисление характеристик при модуле упругости E_ef.kr:
# Коэффициент приведения бетона к стали
# при условном модуле упругости
n_b.kr := E_st/E_ef.kr = 29.1741
# Расстояние от Ц.Т. железобетонного сечения Cb до Ц.Т. стального сечения Cs
Z_bs.kr := (b_sl*t_sl/n_b.kr*(h_f/2 + h_п + h_s/2) + b_f*h_п/n_b.kr*(h_п/2 + h_s/2) + A_r/n_r*(d_r/2 + a_r + h_п + h_s/2))/(A_b/n_b.kr + A_r/n_r)
Z_bs.kr = 425.065 mm
# Расстояние от Ц.Т. композитного сечения Cstb до Ц.Т. стального сечения Cs
Z_s.stb.kr := (b_sl*t_sl/n_b.kr*(h_f/2 + h_п + h_s/2) + b_f*h_п/n_b.kr*(h_п/2 + h_s/2) + A_r/n_r*(d_r/2 + a_r + h_п + h_s/2))/(A_b/n_b.kr + A_r/n_r + A_s)
Z_s.stb.kr = 191.546 mm
# Расстояние от Ц.Т. композитного сечения Cstb до Ц.Т. железобетонного сечения Cb
Z_b.stb.kr := Z_bs.kr - Z_s.stb.kr
Z_b.stb.kr = 233.519 mm
# Момент инерции сталежелезобетонного сечения балки
I_stb.kr := I_s + b_sl*t_sl^3/(n_b.kr*12) + A_s*Z_s.stb.kr^2 + (A_b/n_b.kr + A_r/n_r)*Z_b.stb.kr^2
I_stb.kr = 300238 cm^4
# Момент сопротивления железобетонной части сечения:
W_b.stb.kr := I_stb.kr/Z_b.stb.kr = 12857.1 cm^3
# Вычисление напряжений от ползучести:
# Момент от постоянной нагрузки на второй стадии:
M_2d := q_2.DL*l_beam^2/8 = 0
# Напряжения от ползучести в бетоне:
σ_b.kr0 := M_2d/(n_b.kr*W_b.stb.kr) - M_2d/(n_b*W_b.stb) = 0 kgf/cm^2
# Напряжения от ползучести в арматуре:
σ_r.kr0 := M_2d/(n_r*W_b.stb.kr) - M_2d/(n_r*W_b.stb) = 0 kgf/cm^2
# 2.2.4 Напряжения от изменения температуры
# Коэффициент надежности по нагрузке
γ_f.t := 1.2
# Площадь сечения сталежелезобетонной балки
A_stb.t := A_stb
# Момент инерции сталежелезобетонной балки
A_stb.t = 783.732 cm^2
I_stb.t := I_stb
I_stb.t = 410020 cm^4
# Коэффициент линейного расширения стали и бетона
α := 1*10^-5
# Нормативное наибольшее значение разницы температуры
t_n.max := 15
# Расчетное наибольшее значение разницы температуры
t_max := t_n.max*γ_f.t = 18
# Площадь стальных вертикальных элементов
A_wt := A_w = 90.74 cm^2
# Площадь стальных горизонтальных элементов нижнего пояса
A_s1.t := A_s1 = 48.1 cm^2
# Площадь расчетной части стального сечения
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A_t := 0.8*A_wt + 0.3*A_s1.t
A_t = 87.022 cm^2
# Высота стенки
h_w := h_s - 2*t_f = 660 mm
# Расстояние от центра тяжести композитного сечения до нижней грани верхнего пояса
Z_b1.stb := Z_s2.s - Z_s.stb - t_f = 5.16207 mm
# Расстояние от центра тяжести композитного сечения до верхней грани нижнего пояса
Z_s1.stb := Z_s1.s + Z_s.stb - t_f = 654.838 mm
# Статический момент расчетной части стального сечения
S_t := (0.4*h_w - 0.8*Z_b1.stb)*A_wt + 0.3*A_s1.t*Z_s1.stb
S_t = 3302.99 cm^3
# Расстояние от центра тяжести композитного сечения до арматуры
Z_r.stb := Z_b1.stb + t_f + h_п + a_r = 73.6621 mm
# Напряжения в бетоне
ν_t := 0
σ_t.b := α*t_max*E_b*(A_t/A_stb.t - S_t/I_stb.t*Z_b.stb) = 1.56053 kgf/cm^2
# Напряжения в арматуре
σ_t.r := α*t_max*E_rs*(A_t/A_stb.t - S_t/I_stb.t*Z_r.stb) = 18.9708 kgf/cm^2
# 2.4 Проверка прочности поперечного сечения по нормальным напряжениям
# 2.4.1 Расчет первой стадии
# Проверка нормальных напряжений в верхней полке
КИ_1 := M_1/(W_s2.s*R_y)
КИ_1 = 0.529994
# Проверка нормальных напряжений в нижней полке
КИ_2 := M_1/(W_s1.s*R_y)
КИ_2 = 0.529994
# 2.4.2 Расчет второй стадии
# Напряжения в арматуре и бетоне от ползучести, усадки и изменений температуры:
# Коэффициент сочетаний для температурной нагрузки
n_t := 0.9
# Коэффициент сочетаний для усадочных воздействий
n_shr := 1
# Коэффициент сочетаний для усилий от ползучести бетона
n_kr := 1
σ_b.kr :=
    σ_b.kr0 if M_2d/(n_b*W_b.stb) > 0.2*R_b
    0 if M_2d/(n_b*W_b.stb) ≤ 0.2*R_b
σ_r.kr :=
    σ_r.kr0 if M_2d/(n_b*W_b.stb) > 0.2*R_b
    0 if M_2d/(n_b*W_b.stb) ≤ 0.2*R_b
n_kr*σ_r.kr = 0
σ_b.kr = 0
σ_r.kr = 0
σ_bi := n_kr*σ_b.kr + n_shr*σ_shr.b + n_t*σ_t.b = 5.21366 kgf/cm^2
X_1 := transpose([0, 0.1, 0.2, 0.3, 0.4, 0.5, 0.6, 0.7, 0.8, 0.9, 1, 2, 3, 4, 5])
Y_1 := transpose([0.01, 0.1, 0.2, 0.3, 0.4, 0.5, 0.6, 0.7, 0.8, 0.9, 1, 1.01, 1.02, 1.03, 1.04])
σ_ri := n_kr*σ_r.kr + n_shr*σ_shr.rs + n_t*σ_t.r = -5.97085 kgf/cm^2
# Напряжения в бетоне
XY_1[:, 0] := X_1
XY_1[:, 1] := Y_1
σ_b := M_2/(n_b*W_b.stb) - σ_bi
σ_b = 27.3046 kgf/cm^2
γ_bi*R_b = 156.017 kgf/cm^2
# Напряжения в расчётной продольной арматуре
σ_r := M_2/(n_r*W_b.stb) - σ_ri
γ_si*R_s = 2141.4 kgf/cm^2
σ_r = 228.242 kgf/cm^2
# 2.4.2.1 Усилия воспринимаемые железобетонным сечением при различном уровне загружения
XY_1 = [
    0, 0.01;
    0.1, 0.1;
    0.2, 0.2;
    0.3, 0.3;
    0.4, 0.4;
    0.5, 0.5;
    0.6, 0.6;
    0.7, 0.7;
    0.8, 0.8;
    0.9, 0.9;
    1, 1;
    2, 1.01;
    3, 1.02;
    4, 1.03;
    5, 1.04
]
Z_1 := [
    1.243, 1.248, 1.253, 1.258, 1.264, 1.269, 1.274, 1.279, 1.283, 1.267, 1.243, 1.243, 1.243, 1.243, 1.243;
    1.187, 1.191, 1.195, 1.199, 1.202, 1.206, 1.209, 1.212, 1.214, 1.160, 1, 1, 1, 1, 1;
    1.152, 1.155, 1.158, 1.162, 1.165, 1.168, 1.170, 1.172, 1.150, 1, 1, 1, 1, 1, 1;
    1.128, 1.131, 1.133, 1.136, 1.139, 1.142, 1.144, 1.145, 1.097, 1, 1, 1, 1, 1, 1;
    1.110, 1.113, 1.115, 1.118, 1.120, 1.123, 1.125, 1.126, 1.069, 1, 1, 1, 1, 1, 1;
    1.097, 1.099, 1.102, 1.104, 1.106, 1.109, 1.110, 1.106, 1.061, 1, 1, 1, 1, 1, 1;
    1.087, 1.089, 1.091, 1.093, 1.095, 1.097, 1.099, 1.079, 1, 1, 1, 1, 1, 1, 1;
    1.078, 1.080, 1.082, 1.084, 1.086, 1.088, 1.090, 1.055, 1, 1, 1, 1, 1, 1, 1;
    1.071, 1.073, 1.075, 1.077, 1.079, 1.081, 1.082, 1.044, 1, 1, 1, 1, 1, 1, 1;
    1.065, 1.067, 1.069, 1.071, 1.073, 1.074, 1.076, 1.036, 1, 1, 1, 1, 1, 1, 1;
    1.060, 1.062, 1.064, 1.066, 1.067, 1.069, 1.071, 1.031, 1, 1, 1, 1, 1, 1, 1;
    1.035, 1.036, 1.037, 1.038, 1.039, 1.040, 1.019, 1, 1, 1, 1, 1, 1, 1, 1;
    1.024, 1.025, 1.026, 1.027, 1.028, 1.029, 1.017, 1, 1, 1, 1, 1, 1, 1, 1;
    1.019, 1.019, 1.020, 1.021, 1.021, 1.022, 1.015, 1, 1, 1, 1, 1, 1, 1, 1;
    1.015, 1.015, 1.016, 1.017, 1.018, 1.018, 1, 1, 1, 1, 1, 1, 1, 1, 1
]
N_br := A_b*σ_b + A_r*σ_r
N_br = 115250 kgf
N_bR.s := A_b*R_b + A_r*σ_r
N_bR.s = 716252 kgf
N_bR.sR := A_b*R_b + A_r*R_s
N_bR.sR = 740461 kgf
# 2.4.2.2 Расчет нижнего пояса
# Поправочный коэффициент к моменту сопротивления
# Площадь меньшего пояса
A_f.min := A_s2 = 48.1 cm^2
x_1 := A_f.min/A_w = 0.530086
y_1 := (A_f.min + A_w)/A_s = 0.742698
# Площадь стенки
A_w = 90.74 cm^2
ω := interp(cspline(XY_1, Z_1), XY_1, Z_1, [x_1; y_1]) = 1.07909
A_f.min/A_w = 0.530086
(A_f.min + A_w)/A_s = 0.742698
ω = 1.07909
N_s :=
    N_br if σ_b < γ_bi*R_b and σ_r < γ_si*R_s
    N_bR.s if σ_b ≥ γ_bi*R_b and σ_r < γ_si*R_s
    N_bR.sR if σ_b ≥ γ_bi*R_b and σ_r ≥ γ_si*R_s
    = 115250 kgf
N_s/(A_s*γ_c*R_y) = 0.159102
η := linterp([0; 0.05; 0.1; 0.15; 0.20; 0.25; 0.30; 0.35; 0.40; 0.45; 0.50; 0.55; 0.60; 0.65; 0.70], [1; 1.29; 1.63; 2.04; 2.47; 2.86; 3.20; 3.38; 3.49; 3.56; 3.57; 3.53; 3.43; 3.29; 3.05], N_s/(A_s*γ_c*R_y))
# Коэффициент, учитывающий влияние продольной силы
η = 2.11828
ω_3 := 1 + η*(ω - 1) = 1.16753
КИ_3 :=
    ((M - Z_b.st*N_br)/(W_s1.s*ω_3) + N_br/A_s + N_e/A_s)/(γ_c*R_y) if σ_b < γ_bi*R_b and σ_r < γ_si*R_s
    ((M - Z_b.st*N_bR.s)/(W_s1.s*ω_3) + N_bR.s/A_s + N_e/A_s)/(γ_c*R_y) if σ_b ≥ γ_bi*R_b and σ_r < γ_si*R_s
    ((M - Z_b.st*N_bR.sR)/(W_s1.s*ω_3) + N_bR.sR/A_s + N_e/A_s)/(γ_c*R_y) if σ_b ≥ γ_bi*R_b and σ_r ≥ γ_si*R_s
КИ_3 = 0.884441
# 2.4.2.3 Расчет верхнего пояса
# Коэффициент условий работы верхнего стального пояса
m_1 := min(1 + (γ_bi*R_b - σ_b)/(γ_c*R_y)*A_b/A_s2, 1.2) = 1.2
ω_4 := max(ω_3/m_1, 1) = 1
КИ_4 :=
    ((M - Z_b.st*N_br)/(W_s2.s*ω_4) - N_br/A_s - N_e/A_s)/(m_1*γ_c*R_y) if σ_b < γ_bi*R_b and σ_r < γ_si*R_s
    ((M - Z_b.st*N_bR.sR)/(W_s2.s*ω_4) - N_bR.sR/A_s - N_e/A_s)/(γ_c*R_y) if σ_b ≥ γ_bi*R_b and σ_r < γ_si*R_s
    ((M - Z_b.st*N_bR.sR)/(W_s2.s*ω_4) - N_bR.sR/A_s - N_e/A_s)/(γ_c*R_y) if σ_b ≥ γ_bi*R_b and σ_r ≥ γ_si*R_s
КИ_4 = 0.548194
# 3.1. Расчёт конструкции объединения плиты и балки
# 3.1.1. Расчет сдвигающих усилий Sq
# Расчетная высота поперечного сечения сталежелезобетонного элемента:
h = 822 mm
# Длина расчетных участков по СП 35.13330.2011:
# Участок I
a_I := 0.18*(h + b_sl) = 0.952785 m
# Участок II
a_II := 0.36*(h + b_sl) = 1.90557 m
# Участок III
a_III := 0.8*(h + b_sl) = 4.2346 m
# Участок IV
a_VI := 1.6*(h + b_sl) = 8.4692 m
# Матрица длин участков:
a_i := [a_II; a_III; l_beam/2 - (a_II + a_III)]
a_i = [1.90557; 4.2346; 2.80233] m
# Матрица границ участков:
a_1 := [a_II; a_II + a_III; l_beam/2]
a_1 = [1.90557; 6.14017; 8.9425] m
a_2 := [0*m; a_II; a_II + a_III]
a_2 = [0; 1.90557; 6.14017] m
# Матрицы моментов для границ участков:
M_а1 := (q_2*l_beam/2)*a_1 - (q_2/2)*a_1^2
M_а1 = [3512764; 8319360; 9225304] kgf*cm
M_а2 := (q_2*l_beam/2)*a_2 - (q_2/2)*a_2^2
M_а2 = [0; 3512764; 8319360] kgf*cm
# Матрица напряжений для границ участков:
σ_b1 := M_а1/(n_b*W_b.stb) = [12.3822; 29.3249; 32.5183] kgf/cm^2
σ_b2 := M_а2/(n_b*W_b.stb) = [0; 12.3822; 29.3249] kgf/cm^2
# Матрица сдвигающих усилий на участках:
S_i := A_b*(σ_b1 - σ_b2) = [50954.1; 69721.7; 13141.1] kgf
A_b = 4115.12 cm^2
sum(S_i) = 133817 kgf
# Матрица погонных сдвигающих сил | Матрица границ участков интенсивности
a_3 := [0; a_I; a_II + 0.5*a_i[1]; a_II + a_III + 0.5*a_i[2]; l_beam/2] = [0; 0.952785; 4.02287; 7.54134; 8.9425] m
s_Q := [0; 1.15*S_i[0]/a_i[0]; S_i[1]/a_i[1]; S_i[2]/a_i[2]; 0] = [0; 30750.5; 16464.8; 4689.35; 0] kgf/m
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# Значения на границах участков:
s_Q1 := linterp(a_3, s_Q, a_1[0]) = 26317 kgf/m  # граница опорного участка
s_Q2 := linterp(a_3, s_Q, a_1[1]) = 9378.69 kgf/m  # граница второго участка
S_Σ := integral(linterp(a_3, s_Q, v), v = min(a_3) .. max(a_3)) = 127627 kgf
# 3.1.2. Расчет сдвигающих сил S_N
# Напряжения от усадки бетона и изменения температуры оказывают разгружающее воздействие и с напряжениями от сдвига не суммируются.
S_eN := N_e = 10000 kgf
s_N := [S_eN/(0.5*a_II); S_eN/a_II; 0] = [10495.5; 5247.77; 0] kgf/m
s_Σ := [s_Q[0] + s_N[0]; s_Q[1] + s_N[1]; s_Q[2] + s_N[2]; s_Q[3]; s_Q[4]]
# 3.1.3. Расчет суммарной интенсивности сдвигающих сил
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# График суммарной интенсивности сдвигающих сил
# Суммарные сдвигающие силы в пределах участков:
S_Σ1 := integral(linterp(a_3, s_Σ, v), v = 0 .. a_1[0]) = 53560 kgf
S_Σ2 := integral(linterp(a_3, s_Σ, v), v = a_1[0] .. a_1[1]) = 76481.5 kgf
S_Σ3 := integral(linterp(a_3, s_Σ, v), v = a_1[1] .. a_1[2]) = 13141.1 kgf
# Диаметр анкера
d_an = 22 mm
# Отношение длины анкера к диаметру
l_an/d_an = 4.54545
# Несущая способность упора на сдвиг:
P_rd :=
    (0.24*l_an/cm*d_an/cm*sqrt(10*R_b/MPa))*kN if l_an/d_an ≤ 4.2
    ((d_an/cm)^2*sqrt(10*R_b/MPa))*kN if l_an/d_an > 4.2
P_rd = 6435.01 kgf
# Количество упоров соответственно для первого, второго и третьего участков::
n_d := [S_Σ1; S_Σ2; S_Σ3]/P_rd = [8.32322; 11.8852; 2.04213]
l_an.a.i := a_i/n_d = [228.946; 356.291; 1372.26] mm
# Средняя толщина плиты
t_m := A_b/b_sl = 92.0352 mm
# Максимальное расстояние между анкерами
l_an.max := 8*t_m = 0.736282 m
# 3.1.4. Расчет конструкции объединения на отрыв
# Суммарное сдвигающее усилие на концевом участке:
S_e := S_i[0] + S_eN = 60954.1 kgf
# Расстояние от Ц.Т. бетона до верхней фибры стальной конструкции
Z_b.s2 := Z_b.s - Z_s2.s = 78.0906 mm
S_ab := 5.6*Z_b.s2/(h + b_sl)*S_e = 5035.78 kgf
# Расстояние, на котором приложена отрывающая сила:
a_ab := 0.024*(h + b_sl) = 0.127038 m
# Несущая способность упора на растяжение:
# Расчетное сопротивление стали стад-болта по ГОСТ Р 55738-2013 (тип SD), класс 355:
R_yd := 355*MPa/1.05 = 3447.61 kgf/cm^2
# Площадь анкера
A_an := π*d_an^2/4 = 3.80133 cm^2
# Несущая способность анкера на отрыв
S_u := R_yd*A_an = 13105.5 kgf
# Требуемое количество анкеров, в опорной зоне, работающих на отрыв:
n_de := S_ab/S_u = 0.38425
# 4. Расчет по второй группе предельных состояний
# 4.1. Расчет величины строительного подъема балки
# Первая стадия. Нормативная постоянная нагрузка
q_1.DL = 390 kgf/m^2
# Погонная нагрузка
q_d := q_1.DL*B = 1989 kgf/m
s_i[1]/P_rd =  # error: Эта переменная не определена.
f_С.П. := 5/384*q_d*l_beam^4/(E_st*I_s) = 8.57858 cm
f_С.П. = 8.57858 cm  # - требуемый строительный подъем
# 4.2. Проверка прогибов на второй стадии. Эстетико-психологические
# (п. 2а табл. Е.1)
# Вторая стадия. Нормативная постоянная нагрузка
q_2.DL = 0 kgf/m^2
# Вторая стадия. Нормативная временная нагрузка
q_LL = 377 kgf/m^2
# Погонная нагрузка
q_2а := (q_2.DL + q_LL)*B = 1922.7 kgf/m
# Высота помещения
H := 3*m
k :=
    linterp([0.1; 1; 3; 6; 12; 24; 1000], [120; 120; 150; 200; 250; 300; 300], l_beam/m) if H ≤ 6*m
    linterp([0.1; 1; 3; 6; 24; 36; 1000], [120; 120; 150; 200; 250; 300; 300], l_beam/m) if H > 6*m
    = 274.521
f_u.2а := l_beam/k = 0.0651499 m
k = 274.521
I_x.tr.2а := 5/384*q_2а*l_beam^4/(E_st*f_u.2а) = 187238 cm^4
КИ_6 := I_x.tr.2а/I_stb = 0.456656  # < 1 условие деформативности выполняется
# 4.3. Проверка прогибов на второй стадии. Конструктивные (п. 2в табл. Е.1)
# Вторая стадия. Нормативная временная нагрузка
q_LL = 377 kgf/m^2
# Погонная нагрузка
q_2в := q_LL*B = 1922.7 kgf/m
f_u.2в := l_beam/150 = 119.233 mm
k = 274.521
I_x.tr.2в := 5/384*q_2в*l_beam^4/(E_st*f_u.2в) = 102308 cm^4
KИ_7 := I_x.tr.2в/I_stb = 0.24952  # < 1 условие деформативности выполняется
# 5. Результат
# 5.1 Геометрические характеристики сталежелезобетонного сечения
# Площадь
A_stb = 783.732 cm^2
# Момент инерции
I_stb = 410020 cm^4
# 5.2 Внутренние усилия
# Первая стадия
M_1 = 8668604 kgf*cm
Q_1 = 19387.4 kgf
# Вторая стадия
Q_2 = 20632.5 kgf
M_2 = 9225304 kgf*cm
# Дополнительный момент от Ne
M_e = 324838 kgf*cm
# Суммарно
M = 18218746 kgf*cm
Q = 40019.9 kgf
# 5.3 Проверка прочности поперечного сечения по нормальным напряжениям
# Первая стадия
# Верхняя полка стального сечения
КИ_1 = 0.529994
# Нижняя полка стального сечения
КИ_2 = 0.529994
# Вторая стадия
# Нижняя полка стального сечения
КИ_3 = 0.884441
# Верхняя полка стального сечения
КИ_4 = 0.548194
# 5.4. Проверка по второй группе предельных состояний
# Эстетико-психологические требования
КИ_6 = 0.456656
# Конструктивные требования
KИ_7 = 0.24952
# 5.5. Требования к конструированию балки
# Строительный подъем
f_С.П. = 85.7858 mm
# Длины участков расстановки стад-болтов:
a_i = [1.90557; 4.2346; 2.80233] m
# Количество стад-болтов на участках:
n_d = [8.32322; 11.8852; 2.04213]
# Количество стад-болтов для восприятия отрыва
n_de = 0.38425
# на расстоянии от опоры
a_ab = 0.127038 m
# Максимальное расстояние между анкерами
l_an.max = 0.736282 m
# 6. Расчет усилий в монтажном стыке
# Расстояние от опоры до монтажного стыка
a_j := (6820 + 420)*mm
# Изгибающий момент на первой стадии работы:
M_j.1 := (q_1*l_beam/2)*a_j - (q_1/2)*a_j^2 = 8354405 kgf*cm
# Изгибающий момент на второй стадии работы:
M_j.2 := (q_2*l_beam/2)*a_j - (q_2/2)*a_j^2 = 8890926 kgf*cm
# Суммарный изгибающий момент:
M_j := M_j.1 + M_j.2 = 17245331 kgf*cm
# Поперечная сила:
Q_j := (q_1 + q_2)/2*(l_beam - a_j) = 23819.5 kgf
# Напряжения в бетоне
σ_b.j := M_j.2/(n_b*W_b.stb) - σ_bi
σ_b.j = 26.126 kgf/cm^2
γ_bi*R_b = 156.017 kgf/cm^2
# Напряжения в расчётной продольной арматуре
σ_r.j := M_j.2/(n_r*W_b.stb) - σ_ri
γ_si*R_s = 2141.4 kgf/cm^2
σ_r.j = 220.186 kgf/cm^2
# 2.4.2.1 Усилия воспринимаемые железобетонным сечением при различном уровне загружения
N_br.j := A_b*σ_b.j + A_r*σ_r.j
N_br.j = 110298 kgf
# Напряжения в нижнем поясе
σ_t.j := (M_j - Z_b.st*N_br.j)/W_s1.s + N_br.j/A_s + N_e/A_s = 3679.1 kgf/cm^2
# Напряжения в верхнем поясе
σ_c.j := -((M_j - Z_b.st*N_br.j)/W_s2.s - N_br.j/A_s - N_e/A_s) = -2392.07 kgf/cm^2
# Эквивалентные усилия:
σ_M.j := (σ_t.j - σ_c.j)/2 = 3035.59 kgf/cm^2
M_j.e := σ_M.j*I_s/Z_s1.s = 12813131 kgf*cm
σ_N.j := σ_t.j - σ_M.j = 643.511 kgf/cm^2
N_j.e := σ_N.j*A_s = 120298 kgf
# 7. Расчет на прподольный сдвиг
# Шаг стад-болтов
s_an := a_i/n_d = [228.946; 356.291; 1372.26] mm
# Несущая способность стад-болта на сдвиг
P_rd = 6435.01 kgf
# Длина сдвига
Δx := s_an = [228.946; 356.291; 1372.26] mm
# Напряжения среза, действующие по контакту с-с:
v_Ed := P_rd/(l_an*Δx) = [28.1071; 18.0611; 4.68935] kgf/cm^2
cotθ_f := 1
# Требуемая площадь дополнительной арматуры:
A_rb := v_Ed*l_an/(cotθ_f*R_s) - A_d/l_r = [10.2955; 5.60423; -0.640154] cm^2/m
# Принимается шаг стержней
s_f := [150; 250; 0]*mm
# Требуемая площадь дополнительных арматурных стержней
A_sf1 := A_rb[0]*s_f[0]/2 = 0.772165 cm^2
A_sf2 := A_rb[1]*s_f[1]/2 = 0.700529 cm^2
