# РАСЧЁТ СТАЛЕЖЕЛЕЗОБЕТОННОЙ БАЛКИ В СООТВЕТСТВИИ С СП 35.13330.2011
# Composite Beam v. 1.2
# 1. Исходные данные
# 1.1 Материалы
# 1.1.1 Стальное сечение
# Сталь балки
Сталь := "С390Б"
R_y :=
    (320*MPa) if Сталь == "С345"
    (380*MPa) if Сталь == "С390Б"
# Модуль упругости стали
E_st := 206000*MPa
# Расчётный предел текучести стали
R_y = 3874.92 kgf/cm^2
# 1.1.2 Плита
Бетон := "В30"
R_b :=
    (8.5*MPa) if Бетон == "В15"
    (11.5*MPa) if Бетон == "В20"
    (14.5*MPa) if Бетон == "В25"
    (17*MPa) if Бетон == "В30"
E_b0 :=
    (24000*MPa) if Бетон == "В15"
    (27500*MPa) if Бетон == "В20"
    (30000*MPa) if Бетон == "В25"
    (32500*MPa) if Бетон == "В30"
# Расчётное сопротивление бетона сжатию
R_b = 173.352 kgf/cm^2
# Начальный модуль упругости бетона
E_b0 = 331408 kgf/cm^2
# Предельная относительная деформация для сталежелезобетона
ε_b.lim := 0.0016
# 1.1.3 Арматура
Марка := "А240"
R_s :=
    (210*MPa) if Марка == "А240"
    (435*MPa) if Марка == "А500"
# Марка арматуры
# Модуль упругости арматуры
E_rs := 2038735*kgf/cm^2
# Расчётное сопротивление арматуры
R_s = 2141.4 kgf/cm^2
# 1.2. Геометрия
# 1.2.1 Балка
# Сечение
Балка := "70Б2"
I_s :=
    87546.5*cm^4 if Балка == "60ДБ4"
    98536.49*cm^4 if Балка == "60ДБ5"
    111971*cm^4 if Балка == "60ДБ6"
    126193*cm^4 if Балка == "60Ш2"
    125922*cm^4 if Балка == "70Б1"
    145904.02*cm^4 if Балка == "70Б2"
W_s :=
    2879.8*cm^3 if Балка == "60ДБ4"
    3220*cm^3 if Балка == "60ДБ5"
    3629*cm^3 if Балка == "60ДБ6"
    4285*cm^3 if Балка == "60Ш2"
    3645*cm^3 if Балка == "70Б1"
    4186.63*cm^3 if Балка == "70Б2"
h_s :=
    608*mm if Балка == "60ДБ4"
    612*mm if Балка == "60ДБ5"
    617*mm if Балка == "60ДБ6"
    589*mm if Балка == "60Ш2"
    691*mm if Балка == "70Б1"
    697*mm if Балка == "70Б2"
b_f :=
    228*mm if Балка == "60ДБ4"
    229*mm if Балка == "60ДБ5"
    230*mm if Балка == "60ДБ6"
    300*mm if Балка == "60Ш2"
    260*mm if Балка == "70Б1"
    260*mm if Балка == "70Б2"
A_s :=
    144.49*cm^2 if Балка == "60ДБ4"
    159.32*cm^2 if Балка == "60ДБ5"
    178.52*cm^2 if Балка == "60ДБ6"
    217.41*cm^2 if Балка == "60Ш2"
    164.74*cm^2 if Балка == "70Б1"
    183.64*cm^2 if Балка == "70Б2"
t_f :=
    17.3*mm if Балка == "60ДБ4"
    19.6*mm if Балка == "60ДБ5"
    22.2*mm if Балка == "60ДБ6"
    20.5*mm if Балка == "60Ш2"
    15.5*mm if Балка == "70Б1"
    18.5*mm if Балка == "70Б2"
# Высота балки
h_s = 697 mm
# Ширина пояса балки
b_f = 260 mm
# Толщина полки
t_f = 18.5 mm
# Площадь балки
A_s = 183.64 cm^2
# Пролёт балки
l_beam := 17.885*m
# Шаг балок
B := 5.1*m
# 1.2.2 Плита
h_п := 0*mm
# Высота настила  над верхним поясом балки
# Привести в соответствии с данными двутавров в программе. На 29.11.2020 гармонизирован только 70Б2
# Толщина железобетона над настилом
h_f := 90*mm
# 1.2.3 Армирование
d_r := 6*mm
# Диаметр арматурных стержней
# Шаг арматурных стержней
l_r := 100*mm
# Толщина защитного слоя верхней арматуры
a_u.r := 15*mm
# Толщина защитного слоя нижней арматуры
a_l.r := 15*mm
# 1.3 Объединение стальной и железобетонной частей с помощью упор. Нельсона
# Диаметр анкера
d_an := 22*mm
# Длина анкера
l_an := 100*mm
# 1.4 Нагрузки и коэффициенты надёжности на нагрузке
# 1.4.1 Нагрузки
# 1.4.1.1 Первая стадия
# Нормативная постоянная нагрузка
q_1.DL := 3*kgf/m^2
# 1.4.1.2 Вторая стадия
# Нормативная постоянная нагрузка
q_2.DL := 2*kN/m^2
# Нормативная временная нагрузка
q_LL := 4*kN/m^2
# Продольная сила на уровне центра тяжести балки
N_e := 0*kgf
# 1.4.2 Коэффициенты надёжности по нагрузке
# Постоянная нагрузка первая стадия
γ_f.1.DL := 1.05
# Постоянная нагрузка вторая стадия
γ_f.2.DL := 1.2
# Временная кратковременная нагрузка
γ_f.LL := 1.2
# 1.5 Коэффициенты условий работы
# Коэффициент условий работы стального элемента СП 16.13330
γ_c := 1
# Коэффициент условий работы бетона СП 63.13330
γ_bi := 0.9
# Коэффициент условий работы арматуры по СП 63.13330
γ_si := 1
# 2.Расчёт на прочность
# 2.1.1. Стальное сечение - балка
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W_s1.s := W_s = 4186.63 cm^3  # - момент сопротивления относительно нижней полки
W_s2.s := W_s = 4186.63 cm^3  # - момент сопротивления относительно верхней полки
# Площадь сечения нижней полки
A_s1 := b_f*t_f = 48.1 cm^2
# Площадь сечения верхней полки
A_s2 := b_f*t_f = 48.1 cm^2
# Площадь сечения стенки
A_w := A_s - A_s1 - A_s2 = 87.44 cm^2
# 2.1.2. Бетонное сечение - плита
E_b := E_b0 = 32500 MPa
# Половина ширины контакта плиты и стального пояса
a := b_f/2
a = 130 mm
# Расчётная толщина бетона
t_sl := h_f
t_sl = 90 mm
# Расчётная ширина свеса железобетонной плиты (таблица 4.1 СП)
b :=
    B/2 if l_beam ≥ 4*B
    max(min(a + 6*t_sl, B/2), l_beam/8) otherwise
b = 2235.62 mm
# Расчётная ширина железобетонной плиты
b_sl := 2*b
b_sl = 4.47125 m
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# Площадь бетонного сечения
A_b := b_sl*t_sl + b_f*h_п
A_b = 4024.12 cm^2
# 2.1.3. Армирование плиты
# Площадь арматурного стержня
A_d := π*d_r^2/4
A_d = 0.282743 cm^2
# Площадь арматуры верхнего ряда
A_u.r := A_d/l_r*b_sl
A_u.r = 12.6422 cm^2
# Площадь арматуры нижнего ряда
A_l.r := A_d/l_r*b_sl
A_l.r = 12.6422 cm^2
# Общая площадь арматуры плиты
A_r := A_u.r + A_l.r
A_r = 25.2843 cm^2
# 2.1.3 Композитное сечение
# Коэффициент приведения бетона к стали
n_b := E_st/E_b
n_b = 6.33846
# Коэффициент приведения арматуры к стали
n_r := E_st/E_rs
n_r = 1.03035
# Расстояния в соответствии с рис. 9.3 СП 35.13330.2011:
# Расстояние от Ц.Т. стального сечения Cs до нижней полки
Z_s1.s := h_s/2
Z_s1.s = 348.5 mm
# Расстояние от Ц.Т. стального сечения Cs до верхней полки
Z_s2.s := h_s/2
Z_s2.s = 348.5 mm
# Расстояние от Ц.Т. железобетонного сечения Cb до Ц.Т. стального сечения Cs
# Надо ли учитывать арматуру при нахождении центра тяжести бетона
Z_b.s := (b_sl*t_sl/n_b*(h_f/2 + h_п + h_s/2) + b_f*h_п/n_b*(h_п/2 + h_s/2) + A_l.r/n_r*(a_l.r + h_п + h_s/2) + A_u.r/n_r*(h_s/2 + h_п + h_f - a_u.r))/(A_b/n_b + A_l.r/n_r + A_u.r/n_r)
Z_b.s = 393.5 mm
# Расстояние от Ц.Т. композитного сечения Cstb до Ц.Т. стального сечения Cs
Z_s.stb := (b_sl*t_sl/n_b*(h_f/2 + h_п + h_s/2) + b_f*h_п/n_b*(h_п/2 + h_s/2) + (A_l.r/n_r*(a_l.r + h_п + h_s/2) + A_u.r/n_r*(h_s/2 + h_п + h_f - a_u.r)))/(A_b/n_b + A_l.r/n_r + A_u.r/n_r + A_s)
Z_s.stb = 307.785 mm
# Расстояние от Ц.Т. композитного сечения Cstb до Ц.Т. железобетонного сечения Cb
Z_b.stb := Z_b.s - Z_s.stb
Z_b.stb = 85.715 mm
# Момент инерции сталежелезобетонного сечения балки
I_stb := I_s + b_sl*t_sl^3/(n_b*12) + b_f*h_п^3/(n_b*12) + A_s*Z_s.stb^2 + A_b/n_b*Z_b.stb^2 + A_l.r/n_r*(Z_b.stb - (h_п + h_f/2) + a_l.r)^2 + A_u.r/n_r*(Z_b.stb - (h_п + h_f/2) + (h_п + h_f) - a_u.r)^2
I_stb = 3.72823e9 mm^4
# Момент сопротивления железобетонной части сечения:
W_b.stb := I_stb/Z_b.stb = 43495.6 cm^3
# Условный момент сопротивления на уровне центра тяжести сечения бетона
W_bs := I_s/Z_b.s = 3707.85 cm^3
# Площадь сталежелезобетонного сечения балки:
A_stb := A_b/n_b + A_u.r/n_r + A_l.r/n_r + A_s
A_stb = 843.054 cm^2
# Расчетная высота сечения
h := h_s + h_п + h_f = 787 mm
# 2.2 Нагрузки и воздействия
# 2.2.1. Усилия от вертикальных нагрузок
# Расчётная нагрузка I стадия
n_b = 6.33846
q_1 := γ_f.1.DL*q_1.DL*B
q_1 = 16.065 kgf/m
# Расчётная нагрузка II стадия
q_2 := (γ_f.2.DL*q_2.DL + γ_f.LL*q_LL)*B
q_2 = 3744.4 kgf/m
# Сечение с максимальным изгибающим моментом
# I стадия | II стадия
# Изгибающий момент | Изгибающий момент
M_1 := q_1*l_beam^2/8
M_2 := q_2*l_beam^2/8
M_1 = 64234.5 kgf*cm
M_2 = 14971658 kgf*cm
q := q_1 + q_2 = 3760.46 kgf/m
# Суммарный изгибающий момент
M := M_1 + M_2
# Сечение с максимальной поперечной силой
# I стадия | II стадия
# Расчётная поперечная сила | Расчётная поперечная сила
Q_1 := q_1*l_beam/2
Q_2 := q_2*l_beam/2
Q_1 = 143.661 kgf
Q_2 = 33484.3 kgf
# Суммарная поперечная сила
Q := Q_1 + Q_2
Q = 33627.9 kgf
# 2.2.2 Напряжения от усадки бетона
# Предельная относительная деформация от усадки бетона
# для монолитной плиты:
ε_shr := 2*10^-4
# Условный модуль упругости бетона
E_ef.shr := 0.5*E_b = 165704 kgf/cm^2
# Коэффициент приведения бетона к стали
# при условном модуле упругости
n_b.shr := E_st/E_ef.shr = 12.6769
E_ef.shr = 16250 MPa
# Вычисление характеристик при модуле упругости E_ef.shr:
# Расстояние от Ц.Т. железобетонного сечения Cb до Ц.Т. стального сечения Cs
Z_bs.shr := (b_sl*t_sl/n_b.shr*(h_f/2 + h_п + h_s/2) + b_f*h_п/n_b.shr*(h_п/2 + h_s/2) + A_l.r/n_r*(a_l.r + h_п + h_s/2) + A_u.r/n_r*(h_s/2 + h_п + h_f - a_u.r))/(A_b/n_b.shr + A_l.r/n_r + A_u.r/n_r)
# относиться ли арматура к железобетону? соответственно, надо ли её включать в формулу по расчёту расстоянию
Z_bs.shr = 393.5 mm
# Расстояние от Ц.Т. композитного сечения Cstb до Ц.Т. стального сечения Cs
Z_s.stb.shr := (b_sl*t_sl/n_b.shr*(h_f/2 + h_п + h_s/2) + b_f*h_п/n_b.shr*(h_п/2 + h_s/2) + A_l.r/n_r*(a_l.r + h_п + h_s/2) + A_u.r/n_r*(h_s/2 + h_п + h_f - a_u.r))/(A_b/n_b.shr + A_l.r/n_r + A_u.r/n_r + A_s)
Z_s.stb.shr = 256.019 mm
# Расстояние от Ц.Т. композитного сечения Cstb до Ц.Т. железобетонного сечения Cb
Z_b.stb.shr := Z_bs.shr - Z_s.stb.shr
Z_b.stb.shr = 137.481 mm
# Момент инерции сталежелезобетонного сечения балки
I_stb.shr := I_s + b_sl*t_sl^3/(n_b.shr*12) + b_f*h_п^3/(n_b.shr*12) + A_s*Z_s.stb.shr^2 + A_b/n_b.shr*Z_b.stb.shr^2 + A_l.r/n_r*(Z_b.stb.shr - (h_п + h_f/2) + a_l.r)^2 + A_u.r/n_r*(Z_b.stb.shr - (h_п + h_f/2) + (h_п + h_f) - a_u.r)^2
I_stb.shr = 333273 cm^4
# Площадь сталежелезобетонного сечения балки:
A_stb.shr := A_b/n_b.shr + A_u.r/n_r + A_l.r/n_r + A_s
A_stb.shr = 525.617 cm^2
# Площадь стальной части сечения
A_st.shr := A_s + A_u.r/n_r + A_l.r/n_r = 208.179 cm^2
# Расстояние от центра тяжести A_stb.shr до центра тяжести A_st
Z_st.stb := Z_s.stb.shr - (A_l.r/n_r*(a_l.r + h_п + h_s/2) + A_u.r/n_r*(h_s/2 + h_п + h_f - a_u.r))/(A_u.r/n_r + A_l.r/n_r + A_s)
Z_st.stb = 209.634 mm
# Статический момент стальной части сечения относительно Ц.Т. композитного сечения Cstb
S_shr := A_st.shr*Z_st.stb = 4364.16 cm^3
# Расчет напряжений в бетоне:
# Коэффициент
ν_shr.b := 0
σ_shr.b := ε_shr*E_ef.shr*(A_st.shr/A_stb.shr - S_shr/I_stb.shr*Z_b.stb.shr - ν_shr.b) = 0.702123 MPa  # - растяжение  # сжатие
# Расчет напряжений в арматуре:
# Коэффициент
ν_shr.rs := 1
# напряжение расчитывается в центр тяжести ж.б. плиты
σ_shr.rs := ε_shr*E_rs*(A_st.shr/A_stb.shr - S_shr/I_stb.shr*Z_b.stb.shr - ν_shr.rs) = -31.3478 MPa  # - сжатие  # растяжение
# У Юлии ошибка, применила модуль упругости бетона сниженный на 50%
# 2.2.3 Напряжения от ползучести бетона
# Площадь стальной части сечения, включая арматуру
ε_shr = 0.0002
A_st.kr := A_s + A_u.r/n_r + A_l.r/n_r = 208.179 cm^2
A_s + A_u.r + A_l.r
# Расстояние между Ц.Т. стальной балки и Ц.Т. A_st.kr
Z_s.st := (A_l.r/n_r*(h_s/2 + h_п + a_l.r) + A_u.r/n_r*(h_s/2 + h_п + h_f - a_u.r))/(A_u.r/n_r + A_l.r/n_r + A_s)
Z_s.st = 46.3844 mm
# Момент инерции стальной части сечения, включая арматуру
I_st := I_s + A_s*Z_s.st^2 + A_l.r/n_r*(h_s/2 + h_п + a_l.r - Z_s.st)^2 + A_u.r/n_r*(h_s/2 + h_п + h_f - a_u.r - Z_s.st)^2
I_st = 179643 cm^4
# Расстояние от Ц.Т. стальной части сечения Cst до Ц.Т. железобетонного сечения Cb
Z_b.st := Z_b.s - Z_s.st
Z_b.st = 347.116 mm
# Коэффициент надежности по нагрузке
γ_f := 1.1
# Нормативная деформация ползучести бетона
c_n := 84*10^-6*MPa^-1
# Предельная характеристика ползучести бетона
φ_kr := γ_f*E_b*c_n
φ_kr = 3.003
# Параметр подталивости
ν := A_b/n_b*(1/A_st.kr + Z_b.st^2/I_st) = 7.30783
# Условный модуль упругости бетона
E_ef.kr := (ν - 0.5*φ_kr + 1)/((1 + φ_kr)*ν + 0.5*φ_kr + 1)*E_b
E_ef.kr = 71034.1 kgf/cm^2
# Вычисление характеристик при модуле упругости E_ef.kr:
# Коэффициент приведения бетона к стали
# при условном модуле упругости
n_b.kr := E_st/E_ef.kr = 29.5719
# Расстояние от Ц.Т. железобетонного сечения Cb до Ц.Т. стального сечения Cs
Z_bs.kr := (b_sl*t_sl/n_b.kr*(h_f/2 + h_п + h_s/2) + b_f*h_п/n_b.kr*(h_п/2 + h_s/2) + A_l.r/n_r*(a_l.r + h_п + h_s/2) + A_u.r/n_r*(h_s/2 + h_п + h_f - a_u.r))/(A_b/n_b.kr + A_l.r/n_r + A_u.r/n_r)
Z_bs.kr = 393.5 mm
# Расстояние от Ц.Т. композитного сечения Cstb до Ц.Т. стального сечения Cs
Z_s.stb.kr := (b_sl*t_sl/n_b.kr*(h_f/2 + h_п + h_s/2) + b_f*h_п/n_b.kr*(h_п/2 + h_s/2) + A_l.r/n_r*(a_l.r + h_п + h_s/2) + A_u.r/n_r*(h_s/2 + h_п + h_f - a_u.r))/(A_b/n_b.shr + A_l.r/n_r + A_u.r/n_r + A_s)
Z_s.stb.kr = 120.246 mm
# Расстояние от Ц.Т. композитного сечения Cstb до Ц.Т. железобетонного сечения Cb
Z_b.stb.kr := Z_bs.kr - Z_s.stb.kr
Z_b.stb.kr = 273.254 mm
# Момент инерции сталежелезобетонного сечения балки
I_stb.kr := I_s + b_sl*t_sl^3/(n_b.kr*12) + A_s*Z_s.stb.kr^2 + (A_b/n_b.shr*Z_b.stb.shr^2 + A_l.r/n_r*(Z_b.stb.kr - (h_п + h_f/2) + a_l.r)^2 + A_u.r/n_r*(Z_b.stb.kr - (h_п + h_f/2) + (h_п + h_f) - a_u.r)^2)
I_stb.kr = 251918 cm^4
# Момент сопротивления железобетонной части сечения:
W_b.stb.kr := I_stb.kr/Z_b.stb.kr = 9219.21 cm^3
# Вычисление напряжений от ползучести:
# Момент от постоянной нагрузки на второй стадии:
M_2d := q_2.DL*B*l_beam^2/8 = 407.838 kN*m
# Напряжения от ползучести в бетоне:
σ_b.kr0 := M_2d/(n_b*W_b.stb) - M_2d/(n_b.kr*W_b.stb.kr) = -0.0166351 MPa  # растяжение
# Напряжения от ползучести в арматуре:
σ_r.kr0 := M_2d/(n_r*W_b.stb.kr) - M_2d/(n_r*W_b.stb) = 33.8344 MPa  # сжатие
# 2.4 Проверка прочности поперечного сечения по нормальным напряжениям
# 2.4.1 Расчет первой стадии
# Проверка нормальных напряжений в верхней полке
КИ_1 := M_1/(W_s2.s*R_y)
КИ_1 = 0.00395951
# Проверка нормальных напряжений в нижней полке
КИ_2 := M_1/(W_s1.s*R_y)
КИ_2 = 0.00395951
# 2.4.2 Расчет второй стадии
# Напряжения в арматуре и бетоне от ползучести, усадки и изменений температуры:
# Коэффициент сочетаний для температурной нагрузки
# Коэффициент сочетаний для усадочных воздействий
# Коэффициент сочетаний для усилий от ползучести бетона
σ_b.kr :=
    σ_b.kr0 if M_2d/(n_b*W_b.stb) > 0.2*R_b
    0 if M_2d/(n_b*W_b.stb) ≤ 0.2*R_b
σ_r.kr :=
    σ_r.kr0 if M_2d/(n_b*W_b.stb) > 0.2*R_b
    0 if M_2d/(n_b*W_b.stb) ≤ 0.2*R_b
σ_b.kr = 0 Pa
σ_r.kr = 0 Pa
σ_bi := |σ_b.kr| + |σ_shr.b| = 0.702123 MPa
X_1 := transpose([0, 0.1, 0.2, 0.3, 0.4, 0.5, 0.6, 0.7, 0.8, 0.9, 1, 2, 3, 4, 5])
Y_1 := transpose([0.01, 0.1, 0.2, 0.3, 0.4, 0.5, 0.6, 0.7, 0.8, 0.9, 1, 1.01, 1.02, 1.03, 1.04])
σ_ri := |σ_r.kr| + |σ_shr.rs| = 31.3478 MPa
# Напряжения в бетоне
XY_1[:, 0] := X_1
XY_1[:, 1] := Y_1
σ_b := M_2/(n_b*W_b.stb) - σ_bi
σ_b = 4.62338 MPa
# Напряжения в расчётной продольной арматуре
σ_r := M_2/(n_r*W_b.stb) + σ_ri
σ_r = 64.1089 MPa
# 2.4.2.1 Усилия воспринимаемые железобетонным сечением при различном уровне загружения
XY_1 = [
    0, 0.01;
    0.1, 0.1;
    0.2, 0.2;
    0.3, 0.3;
    0.4, 0.4;
    0.5, 0.5;
    0.6, 0.6;
    0.7, 0.7;
    0.8, 0.8;
    0.9, 0.9;
    1, 1;
    2, 1.01;
    3, 1.02;
    4, 1.03;
    5, 1.04
]
Z_1 := [
    1.243, 1.248, 1.253, 1.258, 1.264, 1.269, 1.274, 1.279, 1.283, 1.267, 1.243, 1.243, 1.243, 1.243, 1.243;
    1.187, 1.191, 1.195, 1.199, 1.202, 1.206, 1.209, 1.212, 1.214, 1.160, 1, 1, 1, 1, 1;
    1.152, 1.155, 1.158, 1.162, 1.165, 1.168, 1.170, 1.172, 1.150, 1, 1, 1, 1, 1, 1;
    1.128, 1.131, 1.133, 1.136, 1.139, 1.142, 1.144, 1.145, 1.097, 1, 1, 1, 1, 1, 1;
    1.110, 1.113, 1.115, 1.118, 1.120, 1.123, 1.125, 1.126, 1.069, 1, 1, 1, 1, 1, 1;
    1.097, 1.099, 1.102, 1.104, 1.106, 1.109, 1.110, 1.106, 1.061, 1, 1, 1, 1, 1, 1;
    1.087, 1.089, 1.091, 1.093, 1.095, 1.097, 1.099, 1.079, 1, 1, 1, 1, 1, 1, 1;
    1.078, 1.080, 1.082, 1.084, 1.086, 1.088, 1.090, 1.055, 1, 1, 1, 1, 1, 1, 1;
    1.071, 1.073, 1.075, 1.077, 1.079, 1.081, 1.082, 1.044, 1, 1, 1, 1, 1, 1, 1;
    1.065, 1.067, 1.069, 1.071, 1.073, 1.074, 1.076, 1.036, 1, 1, 1, 1, 1, 1, 1;
    1.060, 1.062, 1.064, 1.066, 1.067, 1.069, 1.071, 1.031, 1, 1, 1, 1, 1, 1, 1;
    1.035, 1.036, 1.037, 1.038, 1.039, 1.040, 1.019, 1, 1, 1, 1, 1, 1, 1, 1;
    1.024, 1.025, 1.026, 1.027, 1.028, 1.029, 1.017, 1, 1, 1, 1, 1, 1, 1, 1;
    1.019, 1.019, 1.020, 1.021, 1.021, 1.022, 1.015, 1, 1, 1, 1, 1, 1, 1, 1;
    1.015, 1.015, 1.016, 1.017, 1.018, 1.018, 1, 1, 1, 1, 1, 1, 1, 1, 1
]
N_br := A_b*σ_b + A_r*σ_r
N_br = 2022.6 kN
N_bR.s := A_b*R_b + A_r*σ_r
N_bR.s = 7003.11 kN
N_bR.sR := A_b*R_b + A_r*R_s
N_bR.sR = 7371.98 kN
# 2.4.2.2 Расчет нижнего пояса
# Поправочный коэффициент к моменту сопротивления
# Площадь меньшего пояса
A_f.min := A_s2 = 48.1 cm^2
x_1 := A_f.min/A_w = 0.550091
y_1 := (A_f.min + A_w)/A_s = 0.738074
# Площадь стенки
A_w = 87.44 cm^2
ω := interp(cspline(XY_1, Z_1), XY_1, Z_1, [x_1; y_1]) = 1.07158
A_f.min/A_w = 0.550091
(A_f.min + A_w)/A_s = 0.738074
ω = 1.07158
N_s :=
    N_br if σ_b < γ_bi*R_b and σ_r < γ_si*R_s
    N_bR.s if σ_b ≥ γ_bi*R_b and σ_r < γ_si*R_s
    N_bR.sR if σ_b ≥ γ_bi*R_b and σ_r ≥ γ_si*R_s
    = 206248 kgf
N_s/(A_s*γ_c*R_y) = 0.289841
η := linterp([0; 0.05; 0.1; 0.15; 0.20; 0.25; 0.30; 0.35; 0.40; 0.45; 0.50; 0.55; 0.60; 0.65; 0.70], [1; 1.29; 1.63; 2.04; 2.47; 2.86; 3.20; 3.38; 3.49; 3.56; 3.57; 3.53; 3.43; 3.29; 3.05], N_s/(A_s*γ_c*R_y))
# Коэффициент, учитывающий влияние продольной силы
η = 3.13092
ω_3 := 1 + η*(ω - 1) = 1.2241
КИ_3 :=
    ((M - Z_b.st*N_br)/(W_s1.s*ω_3) + N_br/A_s)/(γ_c*R_y) if σ_b < γ_bi*R_b and σ_r < γ_si*R_s
    ((M - Z_b.st*N_bR.s)/(W_s1.s*ω_3) + N_bR.s/A_s)/(γ_c*R_y) if σ_b ≥ γ_bi*R_b and σ_r < γ_si*R_s
    ((M - Z_b.st*N_bR.sR)/(W_s1.s*ω_3) + N_bR.sR/A_s)/(γ_c*R_y) if σ_b ≥ γ_bi*R_b and σ_r ≥ γ_si*R_s
КИ_3 = 0.686484
# 2.4.2.3 Расчет верхнего пояса
# Коэффициент условий работы верхнего стального пояса
m_1 := min(1 + (γ_bi*R_b - σ_b)/(γ_c*R_y)*A_b/A_s2, 1.2) = 1.2
ω_4 := max(ω_3/m_1, 1) = 1.02008
КИ_4 :=
    ((M - Z_b.st*N_br)/(W_s2.s*ω_4) - N_br/A_s)/(m_1*γ_c*R_y) if σ_b < γ_bi*R_b and σ_r < γ_si*R_s
    ((M - Z_b.st*N_bR.sR)/(W_s2.s*ω_4) - N_bR.sR/A_s)/(γ_c*R_y) if σ_b ≥ γ_bi*R_b and σ_r < γ_si*R_s
    ((M - Z_b.st*N_bR.sR)/(W_s2.s*ω_4) - N_bR.sR/A_s)/(γ_c*R_y) if σ_b ≥ γ_bi*R_b and σ_r ≥ γ_si*R_s
КИ_4 = 0.155109
# 3.1. Расчёт конструкции объединения плиты и балки
# 3.1.1. Расчет сдвигающих усилий Sq
# Расчетная высота поперечного сечения сталежелезобетонного элемента:
h = 787 mm
# Длина расчетных участков по СП 35.13330.2011:
# Участок I
a_I := 0.18*(h + b_sl) = 0.946485 m
# Участок II
a_II := 0.36*(h + b_sl) = 1.89297 m
# Участок III
a_III := 0.8*(h + b_sl) = 4.2066 m
# Участок IV
a_VI := 1.6*(h + b_sl) = 8.4132 m
# Матрица длин участков:
a_i := [a_II; a_III; l_beam/2 - (a_II + a_III)]
a_i = [1.89297; 4.2066; 2.84293] m
# Матрица границ участков:
a_1 := [a_II; a_II + a_III; l_beam/2]
a_1 = [1.89297; 6.09957; 8.9425] m
a_2 := [0*m; a_II; a_II + a_III]
a_2 = [0; 1.89297; 6.09957] m
# Матрицы моментов для границ участков:
M_а1 := (q_2*l_beam/2)*a_1 - (q_2/2)*a_1^2
M_а1 = [5667602; 13458500; 14971658] kgf*cm
M_а2 := (q_2*l_beam/2)*a_2 - (q_2/2)*a_2^2
M_а2 = [0; 5667602; 13458500] kgf*cm
# Матрица напряжений для границ участков:
σ_b1 := M_а1/(n_b*W_b.stb) = [20.5575; 48.8165; 54.3051] kgf/cm^2
σ_b2 := M_а2/(n_b*W_b.stb) = [0; 20.5575; 48.8165] kgf/cm^2
# Матрица сдвигающих усилий на участках:
S_i := A_b*(σ_b1 - σ_b2) = [82725.8; 113718; 22086.5] kgf
A_b = 4024.12 cm^2
sum(S_i) = 218530 kgf
# Матрица погонных сдвигающих сил | Матрица границ участков интенсивности
a_3 := [0; a_I; a_II + 0.5*a_i[1]; a_II + a_III + 0.5*a_i[2]; l_beam/2] = [0; 0.946485; 3.99627; 7.52104; 8.9425] m
s_Q := [0; 1.15*S_i[0]/a_i[0]; S_i[1]/a_i[1]; S_i[2]/a_i[2]; 0] = [0; 50256.9; 27033.2; 7768.91; 0] kgf/m
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# Значения на границах участков:
s_Q1 := linterp(a_3, s_Q, a_1[0]) = 43049.5 kgf/m  # граница опорного участка
s_Q2 := linterp(a_3, s_Q, a_1[1]) = 15537.8 kgf/m  # граница второго участка
S_Σ := integral(linterp(a_3, s_Q, v), v = min(a_3) .. max(a_3)) = 208498 kgf
# 3.1.2. Расчет сдвигающих сил S_N
# Напряжения от усадки бетона и изменения температуры оказывают разгружающее воздействие и с напряжениями от сдвига не суммируются.
s_Σ := [s_Q[0]; s_Q[1]; s_Q[2]; s_Q[3]; s_Q[4]]
# 3.1.3. Расчет суммарной интенсивности сдвигающих сил
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# График суммарной интенсивности сдвигающих сил
# Суммарные сдвигающие силы в пределах участков:
S_Σ1 := integral(linterp(a_3, s_Σ, v), v = 0 .. a_1[0]) = 67940.2 kgf
S_Σ2 := integral(linterp(a_3, s_Σ, v), v = a_1[0] .. a_1[1]) = 118472 kgf
S_Σ3 := integral(linterp(a_3, s_Σ, v), v = a_1[1] .. a_1[2]) = 22086.5 kgf
# Диаметр анкера
d_an = 22 mm
# Отношение длины анкера к диаметру
l_an/d_an = 4.54545
# Несущая способность упора на сдвиг:
P_rd :=
    (0.24*l_an/cm*d_an/cm*sqrt(10*R_b/MPa))*kN if l_an/d_an ≤ 4.2
    ((d_an/cm)^2*sqrt(10*R_b/MPa))*kN if l_an/d_an > 4.2
P_rd = 6435.01 kgf
# Количество упоров соответственно для первого, второго и третьего участков::
n_d := [S_Σ1; S_Σ2; S_Σ3]/P_rd = [10.5579; 18.4106; 3.43224]
l_an.a.i := a_i/n_d = [179.294; 228.488; 828.303] mm
# Средняя толщина плиты
t_m := A_b/b_sl = 90 mm
# Максимальное расстояние между анкерами
l_an.max := 8*t_m = 0.72 m
# 3.1.4. Расчет конструкции объединения на отрыв
# Суммарное сдвигающее усилие на концевом участке:
S_e := S_i[0] = 82725.8 kgf
# Расстояние от Ц.Т. бетона до верхней фибры стальной конструкции
Z_b.s2 := Z_b.s - Z_s2.s = 45 mm
S_ab := 5.6*Z_b.s2/(h + b_sl)*S_e = 3964.61 kgf
# Расстояние, на котором приложена отрывающая сила:
a_ab := 0.024*(h + b_sl) = 0.126198 m
# Несущая способность упора на растяжение:
# Расчетное сопротивление стали стад-болта по ГОСТ Р 55738-2013 (тип SD), класс 355:
R_yd := 355*MPa/1.05 = 3447.61 kgf/cm^2
# Площадь анкера
A_an := π*d_an^2/4 = 3.80133 cm^2
# Несущая способность анкера на отрыв
S_u := R_yd*A_an = 13105.5 kgf
# Требуемое количество анкеров, в опорной зоне, работающих на отрыв:
n_de := S_ab/S_u = 0.302515
# 4. Расчет по второй группе предельных состояний
# 4.1. Расчет величины строительного подъема балки
# Первая стадия. Нормативная постоянная нагрузка
q_1.DL = 3 kgf/m^2
# Погонная нагрузка
q_d := q_1.DL*B = 15.3 kgf/m
s_i[1]/P_rd =  # error: This variable is undefined.
f_С.П. := 5/384*q_d*l_beam^4/(E_st*I_s) = 0.0665077 cm
f_С.П. = 0.0665077 cm  # - требуемый строительный подъем
# 4.2. Проверка прогибов на второй стадии. Эстетико-психологические
# (п. 2а табл. Е.1)
# Вторая стадия. Нормативная постоянная нагрузка
q_2.DL = 203.943 kgf/m^2
# Вторая стадия. Нормативная временная нагрузка
q_LL = 407.886 kgf/m^2
# Погонная нагрузка
q_2а := (q_2.DL + q_LL)*B = 3120.33 kgf/m
# Высота помещения
H := 3*m
k :=
    linterp([0.1; 1; 3; 6; 12; 24; 1000], [120; 120; 150; 200; 250; 300; 300], l_beam/m) if H ≤ 6*m
    linterp([0.1; 1; 3; 6; 24; 36; 1000], [120; 120; 150; 200; 250; 300; 300], l_beam/m) if H > 6*m
    = 274.521
f_u.2а := l_beam/k = 0.0651499 m
k = 274.521
I_x.tr.2а := 5/384*q_2а*l_beam^4/(E_st*f_u.2а) = 303763 cm^4
КИ_6 := I_x.tr.2а/I_stb = 0.814765  # < 1 условие деформативности выполняется
# 4.3. Проверка прогибов на второй стадии. Конструктивные (п. 2в табл. Е.1)
# Вторая стадия. Нормативная временная нагрузка
q_LL = 407.886 kgf/m^2
# Погонная нагрузка
q_2в := q_LL*B = 2080.22 kgf/m
f_u.2в := l_beam/150 = 119.233 mm
k = 274.521
I_x.tr.2в := 5/384*q_2в*l_beam^4/(E_st*f_u.2в) = 110652 cm^4
KИ_7 := I_x.tr.2в/I_stb = 0.296795  # < 1 условие деформативности выполняется
# 5. Результат
# 5.1 Геометрические характеристики сталежелезобетонного сечения
# Площадь
A_stb = 843.054 cm^2
# Момент инерции
I_stb = 372823 cm^4
# 5.2 Внутренние усилия
# Первая стадия
M_1 = 64234.5 kgf*cm
Q_1 = 143.661 kgf
# Вторая стадия
Q_2 = 33484.3 kgf
M_2 = 14971658 kgf*cm
# Дополнительный момент от Ne
M_e =  # error
# Суммарно
M = 15035893 kgf*cm
Q = 33627.9 kgf
# 5.3 Проверка прочности поперечного сечения по нормальным напряжениям
# Первая стадия
# Верхняя полка стального сечения
КИ_1 = 0.00395951
# Нижняя полка стального сечения
КИ_2 = 0.00395951
# Вторая стадия
# Нижняя полка стального сечения
КИ_3 = 0.686484
# Верхняя полка стального сечения
КИ_4 = 0.155109
# 5.4. Проверка по второй группе предельных состояний
# Эстетико-психологические требования
КИ_6 = 0.814765
# Конструктивные требования
KИ_7 = 0.296795
# 5.5. Требования к конструированию балки
# Строительный подъем
f_С.П. = 0.665077 mm
# Длины участков расстановки стад-болтов:
a_i = [1.89297; 4.2066; 2.84293] m
# Количество стад-болтов на участках:
n_d = [10.5579; 18.4106; 3.43224]
# Количество стад-болтов для восприятия отрыва
n_de = 0.302515
# на расстоянии от опоры
a_ab = 0.126198 m
# Максимальное расстояние между анкерами
l_an.max = 0.72 m
# 6. Расчет усилий в монтажном стыке
# Расстояние от опоры до монтажного стыка
a_j := (6820 + 420)*mm
# Изгибающий момент на первой стадии работы:
M_j.1 := (q_1*l_beam/2)*a_j - (q_1/2)*a_j^2 = 61906.3 kgf*cm
# Изгибающий момент на второй стадии работы:
M_j.2 := (q_2*l_beam/2)*a_j - (q_2/2)*a_j^2 = 14429000 kgf*cm
# Суммарный изгибающий момент:
M_j := M_j.1 + M_j.2 = 14490906 kgf*cm
# Поперечная сила:
Q_j := (q_1 + q_2)/2*(l_beam - a_j) = 20015.1 kgf
# Напряжения в бетоне
σ_b.j := M_j.2/(n_b*W_b.stb) - σ_bi
σ_b.j = 45.1771 kgf/cm^2
γ_bi*R_b = 156.017 kgf/cm^2
# Напряжения в расчётной продольной арматуре
σ_r.j := M_j.2/(n_r*W_b.stb) - σ_ri
γ_si*R_s = 2141.4 kgf/cm^2
σ_r.j = 2.30381 kgf/cm^2
# 2.4.2.1 Усилия воспринимаемые железобетонным сечением при различном уровне загружения
N_br.j := A_b*σ_b.j + A_r*σ_r.j
N_br.j = 181856 kgf
# Напряжения в нижнем поясе
σ_t.j := (M_j - Z_b.st*N_br.j)/W_s1.s + N_br.j/A_s + N_e/A_s = 2943.74 kgf/cm^2
# Напряжения в верхнем поясе
σ_c.j := -((M_j - Z_b.st*N_br.j)/W_s2.s - N_br.j/A_s - N_e/A_s) = -963.165 kgf/cm^2
# Эквивалентные усилия:
σ_M.j := (σ_t.j - σ_c.j)/2 = 1953.45 kgf/cm^2
M_j.e := σ_M.j*I_s/Z_s1.s = 8178384 kgf*cm
σ_N.j := σ_t.j - σ_M.j = 990.288 kgf/cm^2
N_j.e := σ_N.j*A_s = 181856 kgf
# 7. Расчет на прподольный сдвиг
# Шаг стад-болтов
s_an := a_i/n_d = [179.294; 228.488; 828.303] mm
# Несущая способность стад-болта на сдвиг
P_rd = 6435.01 kgf
# Длина сдвига
Δx := s_an = [179.294; 228.488; 828.303] mm
# Напряжения среза, действующие по контакту с-с:
v_Ed := P_rd/(l_an*Δx) = [35.8908; 28.1635; 7.76891] kgf/cm^2
cotθ_f := 1
# Требуемая площадь дополнительной арматуры:
A_rb := v_Ed*l_an/(cotθ_f*R_s) - A_d/l_r = [13.933; 10.3244; 0.800517] cm^2/m
# Принимается шаг стержней
s_f := [150; 250; 0]*mm
# Требуемая площадь дополнительных арматурных стержней
A_sf1 := A_rb[0]*s_f[0]/2 = 1.04497 cm^2
A_sf2 := A_rb[1]*s_f[1]/2 = 1.29055 cm^2
