# РАСЧЁТ СТАЛЕЖЕЛЕЗОБЕТОННОЙ БАЛКИ В СООТВЕТСТВИИ С СП 35.13330.2011
# Composite Beam v. 2.1
# 1. Исходные данные
# 1.1 Материалы
# 1.1.1 Стальное сечение
# Сталь
"С390Б"  # ok
# Модуль упругости стали
E_st := 206000*MPa  # ok
# Нормативный предел текучести стали
R_y.n := 390*MPa  # ok
# Коэффициент надёжности по материалу
γ_m := 1.025  # ok
# Расчётный предел текучести стали
R_y := R_y.n/γ_m
R_y = 380.488 MPa
# 1.1.2 Плита
# Класс бетона по прочности на сжатие
"B30"  # ok
# Модуль упругости бетона
E_b := 32500*MPa  # ok
# Условный модуль упругости бетона
E_ef.shr := 0.5*E_b
E_ef.shr = 16250 MPa
# Нормативное сопротивление бетона сжатию
R_b := 22.1*MPa  # ok
# Предельная отностительная деформация для сталежелезобетона
ε_b.lim := 0.0016  # ok
# Предельная относительная деформация усадки бетона
ε_shr := 0.0002  # ok  # Находиться в class ConcreteSP35, задаётся const
# Предельная характеристика ползучести бетона
c_n := 84*10^-6*MPa^-1
# Удельный вес
dens := 2500*kgf/m^3
# 1.1.3 Арматура
# Марка арматуры
"А240"
# Модуль упругости арматуры
E_rs := 210000*MPa
# Расчётное сопротивление арматуры
# 1.2. Геометрия
R_s := 210*MPa
# 1.2.1 Пролёт балки
l_beam := 17.885*m
# 1.2.2 Шаг балок
B := 5.1*m
# 1.2.3 Стальная часть
# Номер профиля
"70Б2"
# Высота
h_s := 608*mm
# Ширина пояса
b_f := 260*mm
# Толщина полки
t_f := 18.5*mm
# Площадь балки
A_s := 183.64*cm^2
# Момент сопротивления
W_s := 4186.63*cm^3
# Момент инерции
I_s := 145904.02*cm^4
# 1.2.2 Бетонная часть
# Зазор между плитой и верхней полкой
h_п := 0*mm
# Расчётная толщина плиты
h_f := 90*mm
# 1.2.3 Армирование
d_r := 6*mm
# Диаметр арматурных стержней
# Шаг арматурных стержней
l_r := 100*mm
# Толщина защитного слоя верхней арматуры
a_u.r := 15*mm
# Толщина защитного слоя нижней арматуры
a_l.r := 15*mm
# 1.3 Объединение стальной и бетонной частей гибкими упорами
# Диаметр анкера
d_an := 22*mm
# Длина анкера
l_an := 100*mm
# 1.4 Нагрузки и коэффициенты надёжности на нагрузке
# 1.4.1 Нагрузки
# 1.4.1.1 Первая стадия
# Собственный вес балки
q_1a.SW.s := 144.16*kgf/m
# Собственный вес плиты
q_1a.SW.b := dens*h_f = 2.2065 kN/m^2
# Дополнительная нагрузка от веса бетона
q_1a.AB := 0.26*kN/m^2
# Монтажная нагрузка
q_1a.DL := 0.5*kN/m^2
# 1.4.1.2 Вторая стадия
# Нормативная постоянная нагрузка
q_2d.DL := 2*kN/m^2
# Нормативная временная нагрузка
q_2d.LL := 4*kN/m^2
# 1.4.2 Коэффициенты надёжности по нагрузке
# Собственный вес стальных конструкций
γ_f.s := 1.05
# Собственный вес свежеуложенного бетона
γ_f.b := 1.2
# Дополнительная нагрузка от веса бетона
γ_f.ac := 1.1
# Монтажная нагрузка
γ_f.1.DL := 1.3
# Постоянная нагрузка II стадии
γ_f.2.DL := 1.2
# Временная нагрузка II стадии
γ_f.2.LL := 1.2
# Ползучесть и усадка
γ_f.shr.kr := 1.1
# 1.5 Коэффициенты условий работы
# Коэффициент условий работы стального элемента
γ_c := 1
# Коэффициент условий работы бетона
γ_bi := 0.9
# Коэффициент условий работы арматуры по
γ_si := 1
# 2.Расчёт на прочность
# 2.1 Расчёт геометрических характеристик
# 2.1.1. Стальное сечение - балка
# Расстояние от Ц.Т. стального сечения Cs до нижней полки
Z_s1.s := h_s/2
Z_s1.s = 304 mm
# Расстояние от Ц.Т. стального сечения Cs до верхней полки
Z_s2.s := h_s/2
Z_s2.s = 304 mm
W_s1.s := W_s = 4186.63 cm^3  # - момент сопротивления относительно нижней полки
W_s2.s := W_s = 4186.63 cm^3  # - момент сопротивления относительно верхней полки
# Площадь сечения нижней полки
A_s1 := b_f*t_f = 48.1 cm^2
# Площадь сечения верхней полки
A_s2 := b_f*t_f = 48.1 cm^2
# Площадь сечения стенки
A_w := A_s - A_s1 - A_s2 = 87.44 cm^2  # Расчёт площади стенки в программе отличается
# 2.1.2. Бетонное сечение - плита
# Половина ширины контакта плиты и стального пояса
a := b_f/2
a = 130 mm
# Расчётная толщина бетона
t_sl := h_f
t_sl = 90 mm
# Расчётная ширина свеса железобетонной плиты (табл. 9.3)
b :=
    B/2 if l_beam ≥ 4*B
    max(min(a + 6*t_sl, B/2), l_beam/8) otherwise
b = 2235.62 mm
# Расчётная ширина железобетонной плиты
b_sl := 2*b
b_sl = 4.47125 m
# Площадь бетонного сечения
A_b := b_sl*t_sl + b_f*h_п
A_b = 4024.12 cm^2
# 2.1.3. Армирование плиты
# Площадь арматурного стержня
A_d := π*d_r^2/4
A_d = 0.282743 cm^2
# Площадь арматуры верхнего ряда
A_u.r := A_d/l_r*b_sl
A_u.r = 12.6422 cm^2
# Площадь арматуры нижнего ряда
A_l.r := A_d/l_r*b_sl
A_l.r = 12.6422 cm^2
# Общая площадь арматуры плиты
A_r := A_u.r + A_l.r
A_r = 25.2843 cm^2
# 2.1.4 Композитное сечение
# Высота сечения:
H_stb := h_s + h_п + h_f
H_stb = 698 mm
# 2.1.4.1 Коэффициенты приведения
# Коэффициент приведения арматуры к стали
n_r := E_st/E_rs
n_r = 0.980952
# Коэффициент приведения бетона к стали
n_b := E_st/E_b
n_b = 6.33846
# Коэффициент приведения бетона к стали при условном модуле упругости E_ef.shr
n_b.shr := E_st/E_ef.shr
n_b.shr = 12.6769
# 2.1.4.2 Коэффициент приведения бетона к стали при условном модуле упругости E_ef.kr
# Площадь стальной части сечения включая арматуру
A_st := A_s + A_u.r/n_r + A_l.r/n_r = 20941.5 mm^2
A_st = 209.415 cm^2
# Расстояние между Ц.Т. стальной балки и Ц.Т. A_st
Z_s.st := (A_l.r/n_r*(h_s/2 + h_п + a_l.r) + A_u.r/n_r*(h_s/2 + h_п + h_f - a_u.r))/(A_u.r/n_r + A_l.r/n_r + A_s)
Z_s.st = 42.9557 mm
# Расстояние от Ц.Т. стальной части сечения Cst до Ц.Т. железобетонного сечения Cb
Z_b.st := h_s/2 + (h_п + h_f/2) - Z_s.st
Z_b.st = 306.044 mm
# Момент инерции стальной части сечения, включая арматуру
I_st := I_s + A_s*Z_s.st^2 + A_l.r/n_r*(h_s/2 + h_п + a_l.r - Z_s.st)^2 + A_u.r/n_r*(h_s/2 + h_п + h_f - a_u.r - Z_s.st)^2
I_st = 173666 cm^4
# Параметр подталивости
ν := A_b/n_b*(1/A_st + Z_b.st^2/I_st)
ν = 6.4557
# Предельная характеристика ползучести бетона
φ_kr := γ_f.shr.kr*E_b*c_n
φ_kr = 3.003
# Условный модуль упрругости
E_ef.kr := (ν - 0.5*φ_kr + 1)/((1 + φ_kr)*ν + 0.5*φ_kr + 1)*E_b
# Условный модуль упругости бетона
E_ef.kr = 6827.33 MPa
# Коэффициент приведения бетона к стали при условном модуле упругости E_ef.kr
n_b.kr := E_st/E_ef.kr
n_b.kr = 30.1729
# Расстояния в соответствии с рис. 9.3 СП 35.13330.2011:
# Площадь сталежелезобетонного сечения балки:
A_stb.f(n_b0) := A_b/n_b0 + A_u.r/n_r + A_l.r/n_r + A_s
A_stb := A_stb.f(n_b)
A_stb = 84428.9 mm^2
A_stb.shr := A_stb.f(n_b.shr)
A_stb.shr = 526.852 cm^2
A_stb.kr := A_stb.f(n_b.kr)
A_stb.kr = 342.784 cm^2
# Расстояние от Ц.Т. железобетонного сечения Cb до Ц.Т. стального сечения Cs
Z_b.s := b_sl*t_sl*(h_f/2 + h_п + h_s/2)/A_b
Z_b.s = 349 mm
# Расстояние от Ц.Т. композитного сечения Cstb до Ц.Т. стального сечения Cs
Z_s.stb.f(n_b0) := (b_sl*t_sl/n_b0*(h_f/2 + h_п + h_s/2) + b_f*h_п/n_b0*(h_п/2 + h_s/2))/A_stb.f(n_b0) + (A_l.r/n_r*(a_l.r + h_п + h_s/2) + A_u.r/n_r*(h_s/2 + h_п + h_f - a_u.r))/A_stb.f(n_b0)
Z_s.stb := Z_s.stb.f(n_b)
Z_s.stb = 273.09 mm
Z_s.stb.shr := Z_s.stb.f(n_b.shr)
Z_s.stb.shr = 227.352 mm
Z_s.stb.kr := Z_s.stb.f(n_b.kr)
Z_s.stb.kr = 162.03 mm
# Расстояние от центра тяжести A_stb.shr до центра тяжести A_st
Z_st.stb.shr := Z_s.stb.shr - (A_l.r/n_r*(a_l.r + h_п + h_s/2) + A_u.r/n_r*(h_s/2 + h_п + h_f - a_u.r))/(A_u.r/n_r + A_l.r/n_r + A_s)
# Статический момент стальной части сечения относительно Ц.Т. композитного сечения Cstb
S_st.shr := A_st*Z_st.stb.shr
S_st.shr = 3861.55 cm^3
# Расстояние от Ц.Т. композитного сечения Cstb до Ц.Т. железобетонного сечения Cb
Z_b.stb.f(n_b0) := Z_b.s - Z_s.stb.f(n_b0)
Z_b.stb := Z_b.stb.f(n_b)
Z_b.stb = 75.9104 mm
Z_b.stb.shr := Z_b.stb.f(n_b.shr)
Z_b.stb.shr = 121.648 mm
Z_b.stb.kr := Z_b.stb.f(n_b.kr)
Z_b.stb.kr = 186.97 mm
# Момент инерции сталежелезобетонного сечения балки
I_stb.f(n_b0) := I_s + A_s*Z_s.stb.f(n_b0)^2 + 1/n_b0*(b_sl*t_sl^3/12 + A_b*Z_b.stb.f(n_b0)^2) + A_l.r/n_r*(Z_b.stb.f(n_b0) - (h_п + h_f/2) + a_l.r)^2 + A_u.r/n_r*(Z_b.stb.f(n_b0) - (h_п + h_f/2) + (h_п + h_f) - a_u.r)^2
3728235891/3254454931.28 = 1.14558
I_stb := I_stb.f(n_b)
I_stb = 3.25445e9 mm^4
I_stb.shr := I_stb.f(n_b)
I_stb.shr = 325445 cm^4
I_stb.kr := I_stb.f(n_b)
I_stb.kr = 325445 cm^4
# Момент сопротивления железобетонной части сечения:
W_b.stb.f(n_b0) := I_stb.f(n_b0)/Z_b.stb.f(n_b0)
W_b.stb := W_b.stb.f(n_b)
W_b.stb = 42872.3 cm^3
W_b.stb.shr := W_b.stb.f(n_b.shr)
W_b.stb.shr = 24167.3 cm^3
W_b.stb.kr := W_b.stb.f(n_b.kr)
W_b.stb.kr = 13418.3 cm^3
# Условный момент сопротивления на уровне центра тяжести сечения бетона
W_bs := I_s/Z_b.s
W_bs = 4180.63 cm^3
# 2.2 Нагрузки и воздействия
# 2.2.1. Усилия от вертикальных нагрузок
# Расчётная нагрузка 1 стадии этап 'а'
q_1a := γ_f.s*q_1a.SW.s + γ_f.b*q_1a.SW.b*B + γ_f.ac*q_1a.AB*B + γ_f.1.DL*q_1a.DL*B
q_1a = 19.7618 kN/m
# Расчётная нагрузка 1 стадии этап 'b'
q_1b := γ_f.s*q_1a.SW.s + γ_f.b*q_1a.SW.b*B + γ_f.ac*q_1a.AB*B
q_1b = 16.4468 kN/m
# Расчётная  постоянная нагрузка 2 стадии
q_2.DL := γ_f.2.DL*q_2d.DL*B
q_2.DL = 12.24 kN/m
# Расчётная нагрузка 2 стадии
q_2 := (γ_f.2.DL*q_2d.DL + γ_f.2.LL*q_2d.LL)*B
q_2 = 36.72 kN/m
# 2.3 Усилия в расчётных сечениях
# Сечение с максимальным изгибающим моментом
# 1a стадия | 1b стадия
# Расчётный изгибающий момент | Расчётный изгибающий момент
M_1a := q_1a*l_beam^2/8
M_1a = 790.158 kN*m
M_1b := q_1b*l_beam^2/8
M_1b = 657.61 kN*m
# 2 стадия
# Расчётный изгибающий момент
M_2 := q_2*l_beam^2/8
M_2 = 1468.22 kN*m
# Суммарный изгибающий момент
M := M_1b + M_2
M = 2125.83 kN*m
# Сечение с максимальной поперечной силой
# I стадия | II стадия
# Расчётная поперечная сила | Расчётная поперечная сила
Q_1 := q_1b*l_beam/2
Q_2 := q_2*l_beam/2
Q_1 = 147.075 kN
Q_2 = 328.369 kN
# Суммарная поперечная сила
Q := Q_1 + Q_2
Q = 475.444 kN
# 2.4 Напряжения от усадки бетона
# Расчет напряжений в бетоне:
# Коэффициент
ν_shr.b := 0
σ_shr.b := ε_shr*E_ef.shr*(A_st/A_stb.shr - S_st.shr/I_stb.shr*Z_b.stb.shr - ν_shr.b) = 0.822717 MPa  # - растяжение  # сжатие
# Расчет напряжений в арматуре:
# Коэффициент
ν_shr.rs := 1
# напряжение расчитывается в центр тяжести ж.б. плиты
σ_shr.r := ε_shr*E_rs*(A_st/A_stb.shr - S_st.shr/I_stb.shr*Z_b.stb.shr - ν_shr.rs) = -31.368 MPa  # - сжатие  # растяжение
# У Юлии ошибка, применила модуль упругости бетона сниженный на 50%
# 2.2.3 Напряжения от ползучести бетона
# Вычисление напряжений от ползучести:
# Момент от постоянной нагрузки на второй стадии:
M_2d := q_2.DL*l_beam^2/8 = 489.406 kN*m
# Напряжения от ползучести в бетоне:
σ_b.kr0 := M_2d/(n_b.kr*W_b.stb.kr) - M_2d/(n_b*W_b.stb) = -0.592176 MPa  # растяжение
# Напряжения от ползучести в арматуре:
σ_r.kr0 := M_2d/(n_r*W_b.stb.kr) - M_2d/(n_r*W_b.stb) = 25.5441 MPa  # сжатие
# 2.4 Проверка прочности поперечного сечения по нормальным напряжениям
# 2.4.1 Расчет первой стадии
# Проверка нормальных напряжений в верхней полке
КИ_1 := M_1a/(W_s2.s*R_y)
КИ_1 = 0.496031
# Проверка нормальных напряжений в нижней полке
КИ_2 := M_1a/(W_s1.s*R_y)
КИ_2 = 0.496031
# 2.4.2 Расчет второй стадии
# Напряжения в арматуре и бетоне от ползучести, усадки и изменений температуры:
# Коэффициент сочетаний для температурной нагрузки
# Коэффициент сочетаний для усадочных воздействий
# Коэффициент сочетаний для усилий от ползучести бетона
σ_b.kr :=
    σ_b.kr0 if M_2d/(n_b*W_b.stb) > 0.2*R_b
    0 if M_2d/(n_b*W_b.stb) ≤ 0.2*R_b
σ_r.kr :=
    σ_r.kr0 if M_2d/(n_b*W_b.stb) > 0.2*R_b
    0 if M_2d/(n_b*W_b.stb) ≤ 0.2*R_b
X_1 := transpose([0, 0.1, 0.2, 0.3, 0.4, 0.5, 0.6, 0.7, 0.8, 0.9, 1, 2, 3, 4, 5])
σ_b.kr = 0 Pa
σ_r.kr = 0 Pa
Y_1 := transpose([0.01, 0.1, 0.2, 0.3, 0.4, 0.5, 0.6, 0.7, 0.8, 0.9, 1, 1.01, 1.02, 1.03, 1.04])
σ_bi := |σ_b.kr| + |σ_shr.b| = 0.822717 MPa
XY_1[:, 0] := X_1
XY_1[:, 1] := Y_1
σ_ri := |σ_r.kr| + |σ_shr.r| = 31.368 MPa
σ_r.kr0 = 25.5441 MPa
# Напряжения в бетоне
σ_b := M_2/(n_b*W_b.stb) - σ_bi
σ_b = 4.58022 MPa
# Напряжения в расчётной продольной арматуре
σ_r := M_2/(n_r*W_b.stb) + σ_ri
σ_r = 66.2792 MPa
σ_b = 4580219 Pa
XY_1 = [
    0, 0.01;
    0.1, 0.1;
    0.2, 0.2;
    0.3, 0.3;
    0.4, 0.4;
    0.5, 0.5;
    0.6, 0.6;
    0.7, 0.7;
    0.8, 0.8;
    0.9, 0.9;
    1, 1;
    2, 1.01;
    3, 1.02;
    4, 1.03;
    5, 1.04
]
Z_1 := [
    1.243, 1.248, 1.253, 1.258, 1.264, 1.269, 1.274, 1.279, 1.283, 1.267, 1.243, 1.243, 1.243, 1.243, 1.243;
    1.187, 1.191, 1.195, 1.199, 1.202, 1.206, 1.209, 1.212, 1.214, 1.160, 1, 1, 1, 1, 1;
    1.152, 1.155, 1.158, 1.162, 1.165, 1.168, 1.170, 1.172, 1.150, 1, 1, 1, 1, 1, 1;
    1.128, 1.131, 1.133, 1.136, 1.139, 1.142, 1.144, 1.145, 1.097, 1, 1, 1, 1, 1, 1;
    1.110, 1.113, 1.115, 1.118, 1.120, 1.123, 1.125, 1.126, 1.069, 1, 1, 1, 1, 1, 1;
    1.097, 1.099, 1.102, 1.104, 1.106, 1.109, 1.110, 1.106, 1.061, 1, 1, 1, 1, 1, 1;
    1.087, 1.089, 1.091, 1.093, 1.095, 1.097, 1.099, 1.079, 1, 1, 1, 1, 1, 1, 1;
    1.078, 1.080, 1.082, 1.084, 1.086, 1.088, 1.090, 1.055, 1, 1, 1, 1, 1, 1, 1;
    1.071, 1.073, 1.075, 1.077, 1.079, 1.081, 1.082, 1.044, 1, 1, 1, 1, 1, 1, 1;
    1.065, 1.067, 1.069, 1.071, 1.073, 1.074, 1.076, 1.036, 1, 1, 1, 1, 1, 1, 1;
    1.060, 1.062, 1.064, 1.066, 1.067, 1.069, 1.071, 1.031, 1, 1, 1, 1, 1, 1, 1;
    1.035, 1.036, 1.037, 1.038, 1.039, 1.040, 1.019, 1, 1, 1, 1, 1, 1, 1, 1;
    1.024, 1.025, 1.026, 1.027, 1.028, 1.029, 1.017, 1, 1, 1, 1, 1, 1, 1, 1;
    1.019, 1.019, 1.020, 1.021, 1.021, 1.022, 1.015, 1, 1, 1, 1, 1, 1, 1, 1;
    1.015, 1.015, 1.016, 1.017, 1.018, 1.018, 1, 1, 1, 1, 1, 1, 1, 1, 1
]
# 2.4.2.1 Усилия воспринимаемые железобетонным сечением при различном уровне загружения
N_br := A_b*σ_b + A_r*σ_r
N_br = 2010.72 kN
N_bR.r := A_b*R_b + A_r*σ_r
N_bR.r = 9060.9 kN
N_bR.R := A_b*R_b + A_r*R_s
N_bR.R = 9424.29 kN
# 2.4.2.2 Расчет нижнего пояса
# Площадь меньшего пояса
A_f.min := min(A_s1, A_s2) = 48.1 cm^2
x_1 := A_f.min/A_w = 0.550091
y_1 := (A_f.min + A_w)/A_s = 0.738074
A_f.min/A_w = 0.550091
(A_f.min + A_w)/A_s = 0.738074
η(N) :=
    linterp([0; 0.05; 0.1; 0.15; 0.20; 0.25; 0.30; 0.35; 0.40; 0.45; 0.50; 0.55; 0.60; 0.65; 0.70], [1; 1.29; 1.63; 2.04; 2.47; 2.86; 3.20; 3.38; 3.49; 3.56; 3.57; 3.53; 3.43; 3.29; 3.05], N/(A_s*γ_c*R_y)) if N/(A_s*γ_c*R_y) ≤ 0.7
    0 otherwise
ω := interp(cspline(XY_1, Z_1), XY_1, Z_1, [x_1; y_1]) = 1.07158
ω = 1.07158
# Коэффициенты для учёта развития пластических деформаций в сечениях стальной балке
η_br := η(N_br) = 3.11683
η_bR.r := η(N_bR.r) = 0
η_bR.R := η(N_bR.R) = 0
ω_3.br := 1 + η_br*(ω - 1) = 1.22309
ω_3.bR.r := 1 + η_bR.r*(ω - 1) = 1
ω_3.bR.R := 1 + η_bR.R*(ω - 1) = 1
m_1 := min(1 + (γ_bi*R_b - σ_b)/(γ_c*R_y)*A_b/A_s2, 1.2) = 1.2
ω_4.br := max(ω_3.br/m_1, 1) = 1.01924
# 2.4.2.3 Расчет нижнего пояса
КИ_3 :=
    ((M - Z_b.s*N_br)/(W_s1.s*ω_3.br) + N_br/A_s)/(γ_c*R_y) if σ_b < γ_bi*R_b and σ_r < γ_si*R_s
    ((M - Z_b.s*N_bR.r)/(W_s1.s*ω_3.bR.r) + N_bR.r/A_s)/(γ_c*R_y) if σ_b ≥ γ_bi*R_b and σ_r < γ_si*R_s
    ((M - Z_b.s*N_bR.R)/(W_s1.s*ω_3.bR.R) + N_bR.R/A_s)/(γ_c*R_y) if σ_b ≥ γ_bi*R_b and σ_r ≥ γ_si*R_s
КИ_3 = 1.01869
# 2.4.2.3 Расчет верхнего пояса
КИ_4 :=
    ((M - Z_b.s*N_br)/(W_s2.s*ω_4.br) - N_br/A_s)/(m_1*γ_c*R_y) if σ_b < γ_bi*R_b and σ_r < γ_si*R_s
    ((M - Z_b.s*N_bR.R)/(W_s2.s*ω_3.bR.R) - N_bR.R/A_s)/(γ_c*R_y) if σ_b ≥ γ_bi*R_b and σ_r < γ_si*R_s
    ((M - Z_b.s*N_bR.R)/(W_s2.s*ω_3.bR.R) - N_bR.R/A_s)/(γ_c*R_y) if σ_b ≥ γ_bi*R_b and σ_r ≥ γ_si*R_s
КИ_4 = 0.491116
# 3.1. Расчёт конструкции объединения плиты и балки
# 3.1.1. Расчет сдвигающих усилий Sq
# Расчетная высота поперечного сечения сталежелезобетонного элемента:
h =  # error: This variable is undefined.
# Длина расчетных участков по СП 35.13330.2011:
# Участок I
a_I := 0.18*(h + b_sl)
# Участок II
a_II := 0.36*(h + b_sl)
# Участок III
a_III := 0.8*(h + b_sl)
# Участок IV
a_VI := 1.6*(h + b_sl)
# Матрица длин участков:
a_i := [a_II; a_III; l_beam/2 - (a_II + a_III)]
a_i =  # error
# Матрица границ участков:
a_1 := [a_II; a_II + a_III; l_beam/2]
a_1 =  # error
a_2 := [0*m; a_II; a_II + a_III]
a_2 =  # error
# Матрицы моментов для границ участков:
M_а1 := (q_2*l_beam/2)*a_1 - (q_2/2)*a_1^2
M_а1 =  # error
M_а2 := (q_2*l_beam/2)*a_2 - (q_2/2)*a_2^2
M_а2 =  # error
# Матрица напряжений для границ участков:
σ_b1 := M_а1/(n_b*W_b.stb)
σ_b2 := M_а2/(n_b*W_b.stb)
# Матрица сдвигающих усилий на участках:
S_i := A_b*(σ_b1 - σ_b2)
A_b = 4024.12 cm^2
sum(S_i) =  # error
# Матрица погонных сдвигающих сил | Матрица границ участков интенсивности
a_3 := [0; a_I; a_II + 0.5*a_i[1]; a_II + a_III + 0.5*a_i[2]; l_beam/2]
s_Q := [0; 1.15*S_i[0]/a_i[0]; S_i[1]/a_i[1]; S_i[2]/a_i[2]; 0]
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# Значения на границах участков:
s_Q1 := linterp(a_3, s_Q, a_1[0])  # граница опорного участка
s_Q2 := linterp(a_3, s_Q, a_1[1])  # граница второго участка
S_Σ := integral(linterp(a_3, s_Q, v), v = min(a_3) .. max(a_3))
# 3.1.2. Расчет сдвигающих сил S_N
# Напряжения от усадки бетона и изменения температуры оказывают разгружающее воздействие и с напряжениями от сдвига не суммируются.
s_Σ := [s_Q[0]; s_Q[1]; s_Q[2]; s_Q[3]; s_Q[4]]
# 3.1.3. Расчет суммарной интенсивности сдвигающих сил
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# График суммарной интенсивности сдвигающих сил
# Суммарные сдвигающие силы в пределах участков:
S_Σ1 := integral(linterp(a_3, s_Σ, v), v = 0 .. a_1[0])
S_Σ2 := integral(linterp(a_3, s_Σ, v), v = a_1[0] .. a_1[1])
S_Σ3 := integral(linterp(a_3, s_Σ, v), v = a_1[1] .. a_1[2])
# Диаметр анкера
d_an = 22 mm
# Отношение длины анкера к диаметру
l_an/d_an = 4.54545
# Несущая способность упора на сдвиг:
P_rd :=
    (0.24*l_an/cm*d_an/cm*sqrt(10*R_b/MPa))*kN if l_an/d_an ≤ 4.2
    ((d_an/cm)^2*sqrt(10*R_b/MPa))*kN if l_an/d_an > 4.2
P_rd = 7337.04 kgf
# Количество упоров соответственно для первого, второго и третьего участков::
n_d := [S_Σ1; S_Σ2; S_Σ3]/P_rd
l_an.a.i := a_i/n_d
# Средняя толщина плиты
t_m := A_b/b_sl = 90 mm
# Максимальное расстояние между анкерами
l_an.max := 8*t_m = 0.72 m
# 3.1.4. Расчет конструкции объединения на отрыв
# Суммарное сдвигающее усилие на концевом участке:
S_e := S_i[0]
# Расстояние от Ц.Т. бетона до верхней фибры стальной конструкции
Z_b.s2 := Z_b.s - Z_s2.s = 45 mm
S_ab := 5.6*Z_b.s2/(h + b_sl)*S_e
# Расстояние, на котором приложена отрывающая сила:
a_ab := 0.024*(h + b_sl)
# Несущая способность упора на растяжение:
# Расчетное сопротивление стали стад-болта по ГОСТ Р 55738-2013 (тип SD), класс 355:
R_yd := 355*MPa/1.05 = 3447.61 kgf/cm^2
# Площадь анкера
A_an := π*d_an^2/4 = 3.80133 cm^2
# Несущая способность анкера на отрыв
S_u := R_yd*A_an = 13105.5 kgf
# Требуемое количество анкеров, в опорной зоне, работающих на отрыв:
n_de := S_ab/S_u
# 5. Результат
# 5.1 Геометрические характеристики сталежелезобетонного сечения
# Площадь
A_stb = 844.289 cm^2
# Момент инерции
I_stb = 325445 cm^4
# 5.2 Внутренние усилия
# Первая стадия
M_1 =  # error
Q_1 = 14997.5 kgf
# Вторая стадия
Q_2 = 33484.3 kgf
M_2 = 14971658 kgf*cm
# Суммарно
M = 21677416 kgf*cm
Q = 48481.8 kgf
# 5.3 Проверка прочности поперечного сечения по нормальным напряжениям
# Первая стадия
# Верхняя полка стального сечения
КИ_1 = 0.496031
# Нижняя полка стального сечения
КИ_2 = 0.496031
# Вторая стадия
# Нижняя полка стального сечения
КИ_3 = 1.01869
# Верхняя полка стального сечения
КИ_4 = 0.491116
# 7. Расчет на прподольный сдвиг
# Шаг стад-болтов
s_an := a_i/n_d
# Несущая способность стад-болта на сдвиг
P_rd = 7337.04 kgf
# Длина сдвига
Δx := s_an
# Напряжения среза, действующие по контакту с-с:
v_Ed := P_rd/(l_an*Δx)
cotθ_f := 1
# Требуемая площадь дополнительной арматуры:
A_rb := v_Ed*l_an/(cotθ_f*R_s) - A_d/l_r
# Принимается шаг стержней
s_f := [150; 250; 0]*mm
# Требуемая площадь дополнительных арматурных стержней
A_sf1 := A_rb[0]*s_f[0]/2
A_sf2 := A_rb[1]*s_f[1]/2
